# ORBITAL 5 quad
# Natural CHROM
#
# wo  Sextupoles
# wo WF
# [component: outputs TRPRAY]
j_1 := 1
j_2 := j_1 + 63
k_1 := 2
k_2 := k_1 + 63
l_1 := 3
l_2 := l_1 + 63
rows(TRPRAY) = 63062
cols(TRPRAY) = 8
j := j_1, j_2 .. 1000*63 + 1*64
k := k_1, k_2 .. 1000*63 + 64
l := l_1, l_2 .. 1000*63 + 64
N_iter := 3*10^6
step := 600
i := 0 .. rows(TRPRAY) - 1
TRP_iter[i] := TRPRAY[i, 0]
TRP_ray[i] := TRPRAY[i, 1]
TRP_X[i] := TRPRAY[i, 2]
TRP_A[i] := TRPRAY[i, 3]
TRP_Y[i] := TRPRAY[i, 4]
TRP_B[i] := TRPRAY[i, 5]
TRP_T[i] := TRPRAY[i, 6]
TRP_D[i] := TRPRAY[i, 7]
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# [component: outputs TRPRAY]
j_1 := 2
j_2 := j_1 + 63
k_1 := 3
k_2 := k_1 + 63
l_1 := 59
l_2 := l_1 + 63
rows(TRPRAY) = 63062
cols(TRPRAY) = 8
k := k_1, k_2 .. 1000*63 + 64
l := l_1, l_2 .. 1000*63 + 64
j := j_1, j_2 .. 1000*63 + 1*64
N_iter := 3*10^6
step := 600
i := 0 .. rows(TRPRAY) - 1
TRP_iter[i] := TRPRAY[i, 0]
TRP_ray[i] := TRPRAY[i, 1]
TRP_D[i] := TRPRAY[i, 7]
TRP_X[i] := TRPRAY[i, 2]
TRP_A[i] := TRPRAY[i, 3]
TRP_Y[i] := TRPRAY[i, 4]
TRP_B[i] := TRPRAY[i, 5]
TRP_T[i] := TRPRAY[i, 6]
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# ORBITAL 5 quad
# CORR CHROM
#
# w  Sextupoles
# wo WF
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