# POLARIZATION
# Before TRANSITION PROCCEDURE
# Acceleration 300 eV
# 45 deg injection protons
# Parameters
# [component: outputs LAT]
γ_b4 := LAT[0, 0]
α_0.b4 := LAT[0, 1]
α_1.b4 := LAT[0, 2]
η_0.b4 := LAT[0, 3]
η_1.b4 := LAT[0, 4]
γ_b4 = 7.042
α_0.b4 = 0.0200641
α_1.b4 = 0.0796555
η_0.b4 = -0.000101322
η_1.b4 = 0.109296
γ_tr_st := 1/sqrt(α_0.b4) = 7.05976
# Spin Tracking WO RF WO Sextupoles
# [component: outputs TRPSPI]
j_1 := 1
j_2 := j_1 + 33
k_1 := 2
k_2 := k_1 + 33
l_1 := 3
l_2 := l_1 + 33
rows(TRPSPI) = 16532
cols(TRPSPI) = 5
i := 0 .. rows(TRPSPI) - 1
j := j_1, j_2 .. 33*5001
k := k_1, k_2 .. 33*5001
l := l_1, l_2 .. 33*5001
SPI_iter[i] := TRPSPI[i, 0]
SPI_ray[i] := TRPSPI[i, 1]
SX[i] := TRPSPI[i, 2]
SY[i] := TRPSPI[i, 3]
SZ[i] := TRPSPI[i, 4]
N := (3*10^6)/600 = 5000
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r := 0, 1 .. N
a := 1
P_y0 := sum(SY[n], n = 32*(a - 1) + (a - 1) .. 32*a + (a - 1))/31 = 0.707107
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P_y(a) := sum(SY[n], n = 33*(a - 1) .. 33*a - 1)/31
P_x(a) := sum(SX[n], n = 32*(a - 1) + (a - 1) .. 32*a + (a - 1))/31
P_z(a) := sum(SZ[n], n = 32*(a - 1) + (a - 1) .. 32*a + (a - 1))/31
P_y(1) = 0.707107
P_y(5*10^3) - P_y(2) =  # error: Индекс массива является недопустимым для этого массива.
P_y(2) = 0.707103
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# Spin Tracking W RF WO Sextupoles
# [component: outputs TRPSPI]
j_1 := 1
j_2 := j_1 + 33
k_1 := 2
k_2 := k_1 + 33
l_1 := 3
l_2 := l_1 + 33
rows(TRPSPI) = 16532
cols(TRPSPI) = 5
i := 0 .. rows(TRPSPI) - 1
j := j_1, j_2 .. 33*5001
k := k_1, k_2 .. 33*5001
l := l_1, l_2 .. 33*5001
SPI_iter[i] := TRPSPI[i, 0]
SPI_ray[i] := TRPSPI[i, 1]
SX[i] := TRPSPI[i, 2]
SY[i] := TRPSPI[i, 3]
SZ[i] := TRPSPI[i, 4]
N := (3*10^6)/600 = 5000
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r := 0, 1 .. N
a := 1
P_y0 := sum(SY[n], n = 32*(a - 1) + (a - 1) .. 32*a + (a - 1))/31 = 0.707107
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P_y(a) := sum(SY[n], n = 33*(a - 1) .. 33*a - 1)/31
P_x(a) := sum(SX[n], n = 32*(a - 1) + (a - 1) .. 32*a + (a - 1))/31
P_z(a) := sum(SZ[n], n = 32*(a - 1) + (a - 1) .. 32*a + (a - 1))/31
P_y(1) = 0.707107
P_y(5*10^3) - P_y(2) =  # error
P_y(2) = 0.707103
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# Spin Tracking WO RF W Sextupoles
# [component: outputs TRPSPI]
j_1 := 1
j_2 := j_1 + 33
k_1 := 2
k_2 := k_1 + 33
l_1 := 3
l_2 := l_1 + 33
rows(TRPSPI) = 16532
cols(TRPSPI) = 5
i := 0 .. rows(TRPSPI) - 1
j := j_1, j_2 .. 33*5001
k := k_1, k_2 .. 33*5001
l := l_1, l_2 .. 33*5001
SPI_iter[i] := TRPSPI[i, 0]
SPI_ray[i] := TRPSPI[i, 1]
SX[i] := TRPSPI[i, 2]
SY[i] := TRPSPI[i, 3]
SZ[i] := TRPSPI[i, 4]
N := (3*10^6)/600 = 5000
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r := 0, 1 .. N
a := 1
P_y0 := sum(SY[n], n = 32*(a - 1) + (a - 1) .. 32*a + (a - 1))/31 = 0.707107
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P_y(a) := sum(SY[n], n = 33*(a - 1) .. 33*a - 1)/31
P_x(a) := sum(SX[n], n = 32*(a - 1) + (a - 1) .. 32*a + (a - 1))/31
P_z(a) := sum(SZ[n], n = 32*(a - 1) + (a - 1) .. 32*a + (a - 1))/31
P_y(1) = 0.707107
P_y(5*10^3) - P_y(2) =  # error
P_y(2) = 0.707103
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# Orbital Tracking
# [component: outputs TRPRAY]
j_1 := 1
j_2 := j_1 + 33
k_1 := 2
k_2 := k_1 + 33
l_1 := 3
l_2 := l_1 + 33
rows(TRPRAY) = 16532
cols(TRPRAY) = 8
j := j_1, j_2 .. 1000*63 + 1*64
k := k_1, k_2 .. 1000*63 + 64
l := l_1, l_2 .. 1000*63 + 64
N_iter := 3*10^6
step := 600
i := 0 .. rows(TRPRAY) - 1
TRP_iter[i] := TRPRAY[i, 0]
TRP_ray[i] := TRPRAY[i, 1]
TRP_X[i] := TRPRAY[i, 2]
TRP_A[i] := TRPRAY[i, 3]
TRP_Y[i] := TRPRAY[i, 4]
TRP_B[i] := TRPRAY[i, 5]
TRP_T[i] := TRPRAY[i, 6]
TRP_D[i] := TRPRAY[i, 7]
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