# Gold NICA
# SCEME of
# TRANSITION ENERGY, GAMMA-JUMP
# WO SEX
# [component: outputs JUMP]
rows(JUMP) = 6224
cols(JUMP) = 7
i := 0 .. rows(JUMP) - 1
turn[i] := JUMP[i, 0]
γ[i] := JUMP[i, 1]
ΔQ[i] := JUMP[i, 2]
α_0[i] := JUMP[i, 3]
α_1[i] := JUMP[i, 4]
η_0[i] := JUMP[i, 5]
η_1[i] := JUMP[i, 6]
γ_jump[i] := 1/sqrt(α_0[i])
γ_tr := 7.0862
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min(ΔQ) = -0.00337
max(ΔQ) = 0.00561311
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min(α_0)*1000 = 19.4221
max(α_0)*1000 = 20.4647
min(η_0) = -0.000495809
max(η_0) = 0.000557971
# W SEX
# [component: outputs JUMP]
rows(JUMP) = 6224
cols(JUMP) = 7
i := 0 .. rows(JUMP) - 1
turn[i] := JUMP[i, 0]
γ[i] := JUMP[i, 1]
ΔQ[i] := JUMP[i, 2]
α_0[i] := JUMP[i, 3]
α_1[i] := JUMP[i, 4]
η_0[i] := JUMP[i, 5]
η_1[i] := JUMP[i, 6]
min(ΔQ) = -0.00337
γ_jump[i] := 1/sqrt(α_0[i])
γ_tr := 7.0862
max(ΔQ) = 0.00561311
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min(γ)*100 = 708.562
max(γ)*100 = 708.96
min(γ_jump)*100 = 699.032
max(γ_jump)*100 = 717.549
min(α_0)*1000 = 19.4221
max(α_0)*1000 = 20.4647
min(η_0) = -0.000495809
max(η_0) = 0.000557971
# POLARIZATION
# TRANSITION ENERGY, GAMMA-JUMP
# Acceleration 300 eV
# 90 deg injection protons
# Spin Tracking
# [component: outputs TRPSPI]
j_1 := 1
j_2 := j_1 + 32
k_1 := 2
k_2 := k_1 + 32
l_1 := 3
l_2 := l_1 + 32
p_1 := 4
p_2 := p_1 + 32
rows(TRPSPI) = 2048
cols(TRPSPI) = 5
i := 0 .. rows(TRPSPI) - 1
j := j_1, j_2 .. 33*5001
k := k_1, k_2 .. 33*5001
l := l_1, l_2 .. 33*5001
p := p_1, p_2 .. 33*5001
SPI_iter[i] := TRPSPI[i, 0]
SPI_ray[i] := TRPSPI[i, 1]
SX[i] := TRPSPI[i, 2]
SY[i] := TRPSPI[i, 3]
SZ[i] := TRPSPI[i, 4]
N := 6625/100 = 66.25
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r := 0, 1 .. N
a := 1
P_y0 := sum(SY[n], n = 32*(a - 1) .. 32*a - 1)/31 = 0.707107
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P_y(a) := sum(SY[n], n = 32*(a - 1) .. 32*a - 1)/31
P_x(a) := sum(SX[n], n = 32*(a - 1) .. 32*a - 1)/31
P_z(a) := sum(SZ[n], n = 32*(a - 1) .. 32*a - 1)/31
P_y(1) = 0.707107
P_y(62) - P_y(2) = -0.00021201
P_y(2) = 0.707108
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# Spin Tracking w SEXTUPOLES
# [component: outputs TRPSPI]
j_1 := 1
j_2 := j_1 + 32
k_1 := 2
k_2 := k_1 + 32
l_1 := 3
l_2 := l_1 + 32
p_1 := 4
p_2 := p_1 + 32
rows(TRPSPI) = 2048
cols(TRPSPI) = 5
i := 0 .. rows(TRPSPI) - 1
j := j_1, j_2 .. 33*5001
k := k_1, k_2 .. 33*5001
l := l_1, l_2 .. 33*5001
p := p_1, p_2 .. 33*5001
SPI_iter[i] := TRPSPI[i, 0]
SPI_ray[i] := TRPSPI[i, 1]
SX[i] := TRPSPI[i, 2]
SY[i] := TRPSPI[i, 3]
SZ[i] := TRPSPI[i, 4]
N := 6625/100 = 66.25
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r := 0, 1 .. N
a := 1
P_y0 := sum(SY[n], n = 32*(a - 1) .. 32*a - 1)/31 = 0.707107
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P_y(a) := sum(SY[n], n = 32*(a - 1) .. 32*a - 1)/31
P_x(a) := sum(SX[n], n = 32*(a - 1) .. 32*a - 1)/31
P_z(a) := sum(SZ[n], n = 32*(a - 1) .. 32*a - 1)/31
P_y(1) = 0.707107
P_y(62) - P_y(2) = -0.000229387
P_y(2) = 0.70711
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P_y(60)/P_y(1)*1000 = 999.691
# Orbital Tracking
# [component: outputs TRPRAY]
j_1 := 1
j_2 := j_1 + 32
k_1 := 1
k_2 := k_1 + 32
l_1 := 1
l_2 := l_1 + 32
p_1 := 1
p_2 := p_1 + 32
rows(TRPRAY) = 2048
cols(TRPRAY) = 8
j := j_1, j_2 .. 1000*63 + 1*64
k := k_1, k_2 .. 1000*63 + 64
l := l_1, l_2 .. 1000*63 + 64
p := p_1, p_2 .. 1000*63 + 64
N_iter := 3*10^6
step := 600
i := 0 .. rows(TRPRAY) - 1
TRP_iter[i] := TRPRAY[i, 0]
TRP_ray[i] := TRPRAY[i, 1]
TRP_X[i] := TRPRAY[i, 2]
TRP_A[i] := TRPRAY[i, 3]
TRP_Y[i] := TRPRAY[i, 4]
TRP_B[i] := TRPRAY[i, 5]
TRP_T[i] := TRPRAY[i, 6]
TRP_D[i] := TRPRAY[i, 7]
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