# TWISS
# [component: outputs BETAX]
# [component: outputs BETAY]
# [component: outputs DISPX]
# [component: outputs DISPY]
rows(DISPX) = 273
cols(DISPX) = 2
rows(BETAY) = 163
cols(BETAY) = 2
rows(DISPX) = 273
rows(DISPY) =  # error: Эта переменная не определена.
i := 0 .. rows(DISPX) - 1
el[i] := BETAX[i, 1]
β_x[i] := BETAX[i, 0]
β_y[i] := BETAY[i, 0]  # error: Индекс массива является недопустимым для этого массива.
D_x[i] := DISPX[i, 0]
D_y[i] := DISPY[i, 0]  # error: Эта переменная не определена.
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