## Beam Acceleration in NICA using BLonD
## Fundamental constants and equations
c := 2.988*10^8  # m/s
# speed of light
β(γ) := sqrt(1 - 1/γ^2)
m_p := 0.938*10^9  # eV  # proton mass
## Ring and Beam parameters
C_ring := 503.04  # m
# Acc Lenght
E_exp := 12.6*10^9  # eV  # Energy of Experiment
α_0 := 0.0199123143  # MCFs
E_inj := 5.6*10^9  # eV  # Injection Energy (in simulation)
α_1 := -0.06872168475
α_2 := 0.0
U := 300  # eV  # Accelerating Voltage
# Energy, eV
# Gamma
# Momentum, eV/c
γ_tr := 1/sqrt(α_0) = 7.08662  # Transition Energy
# Kin. Energy,
eV
# Gamma
# Momentum,
# eV/c
# Total Energy,
eV
E_kin(n) := U*n + E_inj
γ(n) := E_kin(n)/m_p + 1
p(n) := sqrt((E_kin(n) + m_p)^2 - m_p^2)
E_beam(n) := sqrt((E_kin(n) + m_p)^2)
E_kin(0) = 5600000000  # eV
γ(0) = 6.97015
p(0) = 6.47036e9
E_beam(0) = 6538000000
E_kin(40000) = 5612000000  # eV
γ(40000) = 6.98294
E_beam(40000) = 6550000000
p(40000) = 6.48249e9
n_tr := ((γ_tr - 1)*m_p - E_inj)/U = 364164
n_exp := (E_exp - E_inj)/U = 23333333
E_kin(n_tr) = 5.70925e9
γ(n_tr) = 7.08662
p(n_tr) = 6.58074e9
E_kin(n_exp) = 12600000000
γ(n_exp) = 14.4328
p(n_exp) = 1.35055e10
β(γ_tr) = 0.989994
## RF voltage. Harmonic and Barrier Bucket
## Revolution frequancy
T_s := 1.701*10^-6  # s  # revolution time
V_bb := 5000  # V  # Barrier Bucket height
V_aa := 300  # V  # Acceleration
T_1 := 50  # ns  # Barrier Bucket time duration
T_2 := (T_s*10^9 - 2*T_1)/(2*2) = 400.25  # ns  # Gap distance in time
V_τ(τ) := -V_bb*(-T_1 - T_2/2 < τ < -T_2/2) + V_aa*(-T_2/2 ≤ τ < T_2/2) + V_bb*(T_2/2 ≤ τ < T_1 + T_2/2)  # Analytical waveform of BB
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## Transition JUMP
Δq_max := 0.05
# Here is a 5 different states of longitudinal
# optics based on transition energy:
# 1) acceleration from injection energy with initial value;
# 2) smooth increase to peak
# 3) jump
# 4) smooth recovery till initial transition
# 5) initial value till the experiment energy
#
# 1.First defines 3) state based on the maximum availiable
# speed of transition shift and availiable transition size
# 2.Secondly, we can understand states 3 and 4,
# as they changed parallel to beam energy
# 3.Finally, states 3 and 5 also can be understand
Δγ_tr := 0.045
Q := 9.44
BR := 45  # T/m
l_D := 0.47  # m
N_D := 48
dγdt := 8.5
Δn := n_tr - ((γ_tr - Δγ_tr - 1)*m_p - E_inj)/U = 140700  # Kin. Energy,  # eV
# Gamma
# Momentum,
# eV/c
# Total Energy,
eV
E_kin(n_tr) = 5.70925e9  # eV
γ(n_tr) = 7.08662
p(n_tr) = 6.58074e9
E_beam(n_tr) = 6.64725e9
γ(n_tr) = 7.08662
Δn_jump := 2*Δγ_tr/(T_s*dγdt) = 6224.71
E_kin(n_tr - Δn) = 5.66704e9  # eV
γ(n_tr - Δn) = 7.04162
p(n_tr - Δn) = 6.5381e9
E_beam(n_tr - Δn) = 6.60504e9
E_kin(n_tr - Δn)*(10^-9*10^2) = 566.704
γ(n_tr - Δn) = 7.04162
γ(n_tr + Δn) = 7.13162
T_s*dγdt*Δn_jump = 0.09
E_kin(n_tr + Δn) = 5.75146e9  # eV
γ(n_tr + Δn) = 7.13162
p(n_tr + Δn) = 6.62337e9
E_beam(n_tr + Δn) = 6.68946e9
γ(n_tr - Δn_jump/2)*100 = 708.562
γ_tr - 2*Δγ_tr = 6.99662
T_s*Δn_jump*10^3 = 10.5882  # ms
E_kin(n_tr + Δn) - E_kin(n_tr - Δn) = 84420000  # eV
# (84 MeV in)
2*Δn = 281400  # turns
γ_tr + 2*Δγ_tr = 7.17662
E_kin(n_tr - Δn_jump/2) = 5.70832e9  # eV
γ(n_tr - Δn_jump/2) = 7.08562
p(n_tr - Δn_jump/2) = 6.57979e9
E_beam(n_tr - Δn_jump/2) = 6.64632e9
E_kin(n_tr - Δn_jump/2)*10^-9*10^2 = 570.832
E_kin(n_tr + Δn_jump/2) = 5.71018e9  # eV
γ(n_tr + Δn_jump/2) = 7.08762
p(n_tr + Δn_jump/2) = 6.58168e9
E_beam(n_tr + Δn_jump/2) = 6.64818e9
E_kin(n_tr + Δn_jump/2)*10^-9*10^2 = 571.018
E_kin(n_tr + Δn_jump/2) - E_kin(n_tr - Δn_jump/2) = 1867414  # eV
# (1.8 MeV in)
2*Δn_jump/2 = 6224.71  # turns
γ_jump(n) := dγdt*T_s*(n - n_tr)
γ_tran(n) := γ_tr*(n ≤ n_tr - Δn) + (γ(n) + Δγ_tr)*(n_tr - Δn ≤ n < n_tr - Δn_jump/2) + (γ_tr - γ_jump(n))*(n_tr - Δn_jump/2 ≤ n < n_tr + Δn_jump/2) + (γ(n) - Δγ_tr)*(n_tr + Δn_jump/2 ≤ n < n_tr + Δn) + γ_tr*(n > n_tr + Δn)
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γ_tran(n_tr) = 7.08662
γ_tran(n_tr) = 7.08662
## High order Momentum Compaction Factor
α_0 = 0.0199123
α_1 = -0.0687217
α_2 = 0
η_0(γ) := α_0 - 1/γ^2
η_1(γ) := α_1 - η_0(γ)/γ^2 + 3*β(γ)^2/(2*γ^2)
η_1(γ_tr) = -0.039448
n_tr = 364164  # turns from injection till transition
η(γ, dp_p) := η_0(γ) + η_1(γ)*dp_p
ratio(γ, dp_p) := η_0(γ)/(η_1(γ)*dp_p)
Δn = 140700  # before jump procedure
η_0(γ(n_tr)) = -6.93889e-18
η_1(γ(n_tr)) = -0.039448
η(γ(n_tr), 3*10^-3) = -0.000118344
ratio(γ(n_tr), 3*10^-3) = 5.86333e-14
ratio(γ(n_tr - Δn + 100000), 3*10^-3) = 0.621524
η_0(γ(n_tr - Δn)) = -0.000255315
η_1(γ(n_tr - Δn)) = -0.0390752
η(γ(n_tr - Δn), 3*10^-3) = -0.000372541
ratio(γ(n_tr - Δn), 3*10^-3) = 2.17798
η_0(γ(n_tr + Δn)) = 0.000250498
η_1(γ(n_tr + Δn)) = -0.0398138
η(γ(n_tr + Δn), 3*10^-3) = 0.000131056
ratio(γ(n_tr + Δn), 3*10^-3) = -2.09725
α_tr1 := [-0.07589630257; -0.0740351602; -0.07221977499; -0.07044778249; -0.06872168475]
γ_tr1 := [6.992994909; 7.016401922; 7.039803456; 7.063222502; 7.086619757]
B := -6.11718950956*10^-1
A := 7.66291880313*10^-2
α_tr1_app(x) := A*x + B  # interpolation of alpha_1 for the full range of transition jump
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α_tr1.(n) := α_1*(n ≤ n_tr - Δn) + α_tr1_app(γ_tran(n))*(n_tr - Δn < n < n_tr - Δn + Δn_jump) + α_tr1_app(γ_tran(n))*(n_tr - Δn + Δn_jump ≤ n < n_tr + Δn) + α_1*(n > n_tr + Δn)
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γ_tran(n_tr - Δn_jump/2) = 7.13162
γ_tran(n_tr + Δn_jump/2) = 7.04262
## Alpha 1 calculations
## Alpha 1 calculations NEW
# [component: outputs T]
i := 0 .. rows(T) - 1
ΔQF[i] := T[i, 0]
Len[i] := T[i, 1]
α_0[i] := T[i, 2]
α_1[i] := T[i, 3]
α_2[i] := T[i, 4]
α_3[i] := T[i, 5]
η_c[i] := T[i, 6]
γ_tr[i] := T[i, 7]
ν_x[i] := T[i, 8]
ν_y[i] := T[i, 9]
ξ_x[i] := T[i, 10]
ξ_y[i] := T[i, 11]
γ_tr[5] = 7.10994
γ_tr[i] = [6.99294; 7.01634; 7.03974; 7.06315; 7.08655; 7.10994; 7.13336; 7.15676; 7.18018]
α_0[i] = [0.0204494; 0.0203132; 0.0201784; 0.0200448; 0.0199127; 0.0197819; 0.0196522; 0.0195239; 0.0193968]
α_tr0.(x) := linterp(γ_tr, α_0, x)
A_α.0 := (α_tr0.(γ_tr[8]) - α_tr0.(γ_tr[1]))/(γ_tr[8] - γ_tr[1]) = -0.00559358
B_α.0 := 1/2*(α_tr0.(γ_tr[8]) + α_tr0.(γ_tr[1]) - A_α.0*(γ_tr[8] + γ_tr[1])) = 0.0595597
α_tr0_app.(x) := A_α.0*x + B_α.0
α_tr0_app.(γ_tr[5]) = 0.0197897
α_tr1.(x) := linterp(γ_tr, α_1, x)
A_α.1 := (α_tr1.(γ_tr[8]) - α_tr1.(γ_tr[1]))/(γ_tr[8] - γ_tr[1]) = 0.0688585
B_α.1 := 1/2*(α_tr1.(γ_tr[8]) + α_tr1.(γ_tr[1]) - A_α.1*(γ_tr[8] + γ_tr[1])) = -0.551937
α_tr1_app.(x) := A_α.1*x + B_α.1
α_tr1_app.(γ_tr[5]) = -0.0623569
α_tr2.(x) := linterp(γ_tr, α_2, x)
A_α.2 := (α_tr2.(γ_tr[8]) - α_tr2.(γ_tr[1]))/(γ_tr[8] - γ_tr[1]) = -2.87402
B_α.2 := 1/2*(α_tr2.(γ_tr[8]) + α_tr2.(γ_tr[1]) - A_α.2*(γ_tr[8] + γ_tr[1])) = 21.3402
α_tr2_app.(x) := A_α.2*x + B_α.2
α_tr2_app.(γ_tr[5]) = 0.906078
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(7.145 - 7.09)/(0.49 - 0.44) = 1.1
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n_tr = 364164
Δn_jump = 6224.71
α_tr0_app.(γ_tran(n_tr))*10000 = 199.201
α_tr1_app.(γ_tran(n_tr))*10000 = -639.628
α_tr2_app.(γ_tran(n_tr))*1000 = 973.104
α_tr0_app.(γ_tran(n_tr - Δn_jump/2))*10000 = 196.684
α_tr1_app.(γ_tran(n_tr - Δn_jump/2))*10000 = -608.641
α_tr2_app.(γ_tran(n_tr - Δn_jump/2))*1000 = 843.772
γ_tran(n_tr - Δn_jump/2) = 7.13162
n_tr - Δn_jump/2 = 361052
α_tr0_app.(γ_tran(n_tr + Δn_jump/2))*10000 = 201.662
α_tr1_app.(γ_tran(n_tr + Δn_jump/2))*10000 = -669.929
α_tr2_app.(γ_tran(n_tr + Δn_jump/2))*100 = 109.957
γ_tran(n_tr + Δn_jump/2) = 7.04262
n_tr + Δn_jump/2 = 367277
## Fourier expansion of Barrier Bucket
ϕ_r := 2*T_1/T_2 = 0.249844  # Phase of Barrier gap
h_r := π/ϕ_r = 12.5742  # BB harmonic number
N := 25  # Fourier SUM
g_BB(ϕ, γ, dp_p) := -sign(η(γ, dp_p))*(-π/h_r ≤ ϕ ≤ 0) + sign(η(γ, dp_p))*(0 < ϕ ≤ π/h_r) + 0  # Analytical waveform of Square BB
b(n, h_r, γ, dp_p) := sign(η(γ, dp_p))*2/(π*n)*(1 - cos(π*n/h_r))  # Fourier coefficients  # (n denotes a number of Fourier coefficiet)
σ(n, m) := sinc(π*n/(2*(N + 1)))^m  # Sigma modulation
σ(1, 3) = 0.998176
b(2, h_r, 7, 3*10^-3) = -0.038919
2*π*1*10^6*160*10^-9 = 1.00531
g_fBB(ϕ, γ, dp_p) := sum(σ(n, 3)*b(n, h_r, γ, dp_p)*sin(n*ϕ), n = 1 .. N)  # Fourier signal of Square BB
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σ(10, 3)*b(10, h_r, 7, 3*10^-3) = -0.0952701
σ(25, 3) = 0.288643
b(25, h_r, 7, 3*10^-3) = -1.75127e-5
b(22, 12.574, 7, 3*10^-3) = -0.00849855
σ(2, 3) = 0.992723
V_peak := 5000  # V  # (keV)
n_rf := 25
f(MHz) := MHz  # MHz
# Fourier analysis over BB gap width
ω(i) := 2*π*f(i)
# Gap distance in time as a function of
# Time duration of Barrier Bucket
T_drift(T_BB) := (T_s*10^9 - 2*T_BB)/(2*2)  # ns
M(n, m, γ, dp_p) := σ(n, m)*b(n, h_r, γ, dp_p)
ϕ_BB(T_BB) := 2*T_BB/T_drift(T_BB)
# Phase of Barrier gap as a function of
# Time duration of Barrier Bucket
V_fBB(τ, γ, dp_p) := sum(-V_peak*(M(i, 3, γ, dp_p)*sin(ω(i)*τ)), i = 1 .. n_rf)  # Fourier signal of Square BB
h_BB(T_BB) := π/ϕ_BB(T_BB)
# BB harmonic numberas a function of
# Time duration of Barrier Bucket
h_BB(50) = 12.5742
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# As it can be seen from graphic of
# Amlitude of Fourier coefficients gap of
# 50 ns well described by 25 first harmonics
-V_peak*10^3*b(3, h_BB(50), 7, 5*10^-3) = 284348
V_peak*10^3*M(5, 3, 5, 3*10^-3) = -415931
## Fourier expansion of Acceleration signal
h_r := 1
b_M(n) := 2*sin(n*π/2)/(n*π)
b_Acc(n, h_r, γ, dp_p) := sign(η(γ, dp_p))*2/(π*n)*(1 - cos(π*n/h_r))
g_fM(ϕ) := sum(b_M(n)*cos(n*(ϕ - π/2)), n = 1 .. N) + 1/2
σ(n, m) := sinc(π*n/(2*(N + 1)))^m
g_fBB(ϕ, γ, dp_p) := sum(σ(n, 3)*b_Acc(n, h_r, γ, dp_p)*sin(n*ϕ), n = 1 .. N)
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V_fM(τ, γ, dp_p) := sum(U*10*(b_M(i)*cos(ω(i)*(τ - 0.1701))), i = 1 .. n_rf)
V_fAcc(τ, γ, dp_p) := sum(U*(σ(i, 3)*b_Acc(i, h_r, γ, dp_p)*sin(ω(i)*τ)), i = 1 .. n_rf)
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## Space Charge Impedance
Z_0 := 377  # Ω  # Ohm
# ^(resistivity of free space)
C_ring = 503.04
a := 1.2  # cm  # beam size
c = 298800000
b := 2.86  # cm  # ^(beam pipe radius)
n_σ := b/a
Z_SC.(ω_SC, γ_SC) := -1i*Z_0/(2*π)*ω_SC*C_ring/((γ_SC^2 - 1)*c)*ln(n_σ/1.06)  # From V.Lebedev
Z_SC(n, γ_SC) := -n*Z_0/(2*β(γ_SC)*γ_SC^2)*(1 + 2*ln(b/a))  # Classical formula
Z_SC(1, γ(n_tr - Δn)) = -10.5115
γ(n_tr - Δn) = 7.04162
β(γ(n_tr - Δn)) = 0.989865
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Z_SC.(2*π*10^6, γ(n_tr)) = -10.4479i
Z_SC(1, γ(n_tr)) = -10.3771
f_RF1 := [118, 273, 466, 1411, 1723, 2180]  # MHz
f_RF1[0, 1]*10^6 = 273000000  # Hz
R_RF1 := [983, 2212, 955, 38130, 11780, 1.152*10^6]  # Ohm, Ω
R_RF1[0, 1] = 2212  # Ohm
Q_RF1 := [339, 1334, 1627, 3324, 3596, 14373]
Q_RF1[0, 1] = 1334
i := sqrt(-1)
Z_res(f, R, Q, f_R) := R/(1 + i*Q*(f/f_R - f_R/f))
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Z_res(10*6, R_RF1[0, 1], Q_RF1[0, 1], f_RF1[0, 1]) = 6.62908e-5 + 0.38293i
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## RF Impedance
## Resistive Wall Impedance
i := sqrt(-1)
r := 2.86*10^-2  # m  # r -  Beam pipe radius in m
L := C_ring/2  # L - Beam pipe length in m
σ_c := □  # error: Пустой местозаполнитель.  # σ.c - Beam pipe conductivity in 𝑠/𝑚  # or Beam pipe resistivity in 𝑚/𝑠
Z_RW(f, L, r, σ_c) := Z_0*c*L/π*1/((1 - sign(f))*2*b*c)*sqrt(σ_c*Z_0*c/(4*π*|f|) + i*2*π*b^2*f)
## Threashold curent
m_0 := 1.67*10^-27  # kg
c = 298800000  # m/s
γ_tr := 7.08
β(γ_tr) = 0.989975
σ_p := 3.3*10^-3
η := 2.5*10^-4
e := 1.602*10^-19
Z_imp := 20
N_p := 2.0*10^13
I_th := 2*π*m_0*c^2*β(γ_tr)^2*γ_tr*η*σ_p^2/(e*Z_imp) = 5.5235
(e*N_p)/(T_s/(2*π)) = 11.835
e*0.988*c*N_p/I_th = 171.244
503.04/83 = 6.06072
I_th/(2*e)*T_s = 2.93242e13
# Beam Params | Ring Params | RF Params | Experem Params
A := 1
Z := 1
C := 503.04
h := 22
E_inj := 5.66  # GeV
m_0 := 1.67*10^-27  # kg
V := 100*10^3
V - amplitude
R_0 := C/(2*π)  # m
m_0eV := 0.938  # GeV
E_tr := 5.70832  # GeV
φ_s := 30*π/180
γ_t := 7.08
c = 298800000  # m/s
E_tr - E_inj = 0.04832  # Harmonic 100kV
# Harmonic 1MV
# Barrier Bucket
α_1 := -0.06371671224
e := 1.6*10^-19
V*|sin(φ_s)| = 50000  # eV per turn
T_s*10^3*2*10^5 = 340.2  # ms
(E_tr - E_inj)*10^9/(V*|sin(φ_s)|) = 966.4
# acc near
T_s*10^3*800 = 1.3608  # ms
T_s*10^3*80 = 0.13608  # ms
δ := 3*10^-3
T_s*10^3*6*10^3 = 10.206  # ms
# jump
T_s*10^3*37 = 0.062937  # ms
T_s*10^3*4 = 0.006804  # ms
β_s := β(γ_t) = 0.989975
ω_0 := β_s*c/R_0 = 3694725
T_s := (2*π/ω_0) = 1.70058e-6  # s
γ1 := E_inj/m_0eV + 1 = 7.03412
γ2 := (E_inj + (V*|sin(φ_s)|)/10^9)/m_0eV + 1 = 7.03417
γ_p := (γ2 - γ1)/T_s = 31.3451
# Adiabatic Time
T_ad := (π*β_s^2*m_0*c^2*γ_t^4/(γ_p*ω_0^2*h*e*V*|cos(φ_s)|))^(1/3) = 0.00206792  # s
T_ad*10^3 = 2.06792  # ms
4*T_ad*10^3 = 8.27168  # ms
Δγ_t := 2*γ_p*T_ad = 0.129638
T_ad/T_s = 1216.01
V*|sin(φ_s)|*10^-9*4*T_ad/T_s = 0.243202  # GeV
T_ad := (π*β_s^2*m_0*c^2*γ_t^4/(0.2*ω_0^2*2*e*300))^(1/3) = 0.163876  # s
# Non-linear time
T_nl := (3/2*β_s^2 - α_1*γ_t^2)*δ*γ_t/(2*0.2) = 0.247657  # s
T_nl := (3/2*β_s^2 - α_1*γ_t^2)*δ*γ_t/(2*γ_p) = 0.00158019  # s
T_nl*10^3 = 1.58019  # ms
Δγ_t := 2*γ_p*T_nl = 0.0990626
T_nl/T_s = 929.207
G := e^(2/3*(T_nl/T_ad)^(3/2)) = 0.97305
## Relevant Times
## OptiM Tune Shift
ΔG := [□; □; □; 0; □; □; □]  # error: Пустой местозаполнитель.
ν_x := [□; □; □; 9.44168; □; □; □]  # error: Пустой местозаполнитель.
ν_y := [□; □; □; 9.45072; □; □; □]  # error: Пустой местозаполнитель.
α := [□; □; □; 0.0199123; □; □; □]  # error: Пустой местозаполнитель.
# Barrier Bucket
T_s*10^3*2*10^5 = 340.117  # ms
T_s*10^3*6*10^3 = 10.2035  # ms
