# Beam Params | Ring Params | RF Parrams
A := 1
Z := 1
R_0 =  # error: Эта переменная не определена.  # m
h := 22
m_0 := 1.67*10^-27  # kg
γ_t := 7.08
V := 100*10^3
V - amplitude
α_1 := -0.06371671224
φ_s := 30*π/180
c = 299792458 m/s  # m/s  # RF params
V*|cos(φ_s)| = 86602.5  # eV per turn
e := 1.6*10^-19
γ_p := 100
δ := 3*10^-3
β_s := β(γ_t)
ω_0 := β_s*c/R_0
2*π/ω_0 =  # error
V*|cos(φ_s)|/m_peV + 1 =  # error
T_nl := (3/2*β_s^2 - α_1*γ_t^2)*δ*γ_t/(2*γ_p)  # s
T_nl*10^3 =  # error  # ms
T_ad2 := (π*β_s^2*m_0*c^2*γ_t^4/(γ_p*ω_0^2*h*e*V*|cos(φ_s)|))^(1/3)
T_ad2*10^3 =  # error  # ms
T_ad := (A*m_0*c^4/(R_0^2*h)*γ_t^4/(2*γ_p)*2*π/(Z*e*V*|cos(φ_s)|))^(1/3)
