# Stochastic cooling
c := 3*10^8  # m/s
m_p := 0.938  # GeV
A_Au := 197
f_max := 4*10^9  # Гц
f_min := 2*10^9  # Гц
W := f_max - f_min = 2000000000
N_bunch := 2.2*10^9
C_orb := 503.04  # m
F_bunch := 4 = 4
σ_bunch := 0.6  # m
N := N_bunch*C_orb/(F_bunch*σ_bunch) = 4.6112e11
# Оценка идеального случая
ν := W/N = 0.00433727
τ_per := 1/ν = 230.56
# Оценка для структур
δ := 1.5*10^-3
α_1 := 0.0279239
α_2 := 0.0154573
L_1 := 179.696
L_2 := 323.344
α_gen := (α_1*L_1 + α_2*L_2)/C_orb = 0.0199106
α_3 := 0.00587438
α_4 := 0.00320331
η(α, γ) := α - 1/γ^2
β(γ) := sqrt(1 - 1/γ^2)
γ(E) := E/m_p + 1
η_pk(α_pk, γ) := α_pk - 1/γ^2
T_pk(γ, L_pk) := L_pk/(β(γ)*c)
E_kin(γ) := (γ - 1)*m_p
η_kp(α_kp, γ) := α_kp - 1/γ^2
T_kp(γ, L_kp) := L_kp/(β(γ)*c)
γ(0.272) = 1.28998
γ_tr(α) := 1/sqrt(α)
E_kin(1.28985692) = 0.271886
M_pk(f_max, f_min, γ, α_pk, L_pk, δ) := 1/(2*(f_max + f_min)*η_pk(α_pk, γ)*T_pk(γ, L_pk)*δ)
M_kp(f_max, f_min, γ, α_kp, L_kp, δ) := 1/(2*(f_max - f_min)*η_kp(α_kp, γ)*T_kp(γ, L_kp)*δ)
# Gold NICA | arc | full
ν(f_max, f_min, γ, α_pk, L_pk, α_kp, L_kp, δ) := W/N*(1 - 1/M_pk(f_max, f_min, γ, α_pk, L_pk, δ)^2)^2/M_kp(f_max, f_min, γ, α_kp, L_kp, δ)
1/sqrt(0.0352994) = 5.32251
1/sqrt(0.00742313) = 11.6066
1/sqrt(0.00412617) = 15.5678
τ(f_max, f_min, γ, α_pk, L_pk, α_kp, L_kp, δ) := 1/ν(f_max, f_min, γ, α_pk, L_pk, α_kp, L_kp, δ)
1/sqrt(0.0199123) = 7.08662
1/sqrt(0.007763) = 11.3497
1/sqrt(0.0043499) = 15.1621
E_tr1 := E_kin(γ_tr(α_2))
E_tr2 := E_kin(γ_tr(α_4))
E_exp := 4.5
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β_1x := 16.6472
β_2x := 25.1153
β_3x := 20.8832
D_1x := 0.887978
D_2x := 0.301642
D_3x := 0.10977
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1*D_1x^2/β_1x^2 = 0.00284526
D_2x^2/β_2x^2 = 0.000144247
D_3x^2/β_3x^2 = 2.76295e-5
sqrt(β_1x)*D_1x^2/β_1x^2 = 0.0116089
sqrt(β_2x)*D_2x^2/β_2x^2 = 0.000722896
sqrt(β_3x)*D_3x^2/β_3x^2 = 0.000126262
D_1x/D_2x = 2.94381
D_1x/D_3x = 8.08944
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# Stochastic cooling
c := 3*10^8  # m/s
m_p := 0.938  # GeV
A_Au := 197
f_max := 4*10^9  # Гц
f_min := 2*10^9  # Гц
W := f_max - f_min = 2000000000
N_bunch := 1.2*10^12
C_orb := 503.04  # m
F_bunch := 4 = 4
σ_bunch := 0.6  # m
N := N_bunch*C_orb/(F_bunch*σ_bunch) = 2.5152e14
# Оценка идеального случая
ν := W/N = 7.95165e-6
τ_per := 1/ν = 125760
# Оценка для структур
δ := 1.5*10^-3
α_1 := 0.0279239
α_2 := 0.0154573
L_1 := 179.696
L_2 := 323.344
α_gen := (α_1*L_1 + α_2*L_2)/C_orb = 0.0199106
α_3 := 0.00587438
α_4 := 0.00320331
η(α, γ) := α - 1/γ^2
β(γ) := sqrt(1 - 1/γ^2)
γ(E) := E/m_p + 1
η_pk(α_pk, γ) := α_pk - 1/γ^2
T_pk(γ, L_pk) := L_pk/(β(γ)*c)
E_kin(γ) := (γ - 1)*m_p
η_kp(α_kp, γ) := α_kp - 1/γ^2
T_kp(γ, L_kp) := L_kp/(β(γ)*c)
γ(0.272) = 1.28998
γ_tr(α) := 1/sqrt(α)
E_kin(1.28985692) = 0.271886
M_pk(f_max, f_min, γ, α_pk, L_pk, δ) := 1/(2*(f_max + f_min)*η_pk(α_pk, γ)*T_pk(γ, L_pk)*δ)
M_kp(f_max, f_min, γ, α_kp, L_kp, δ) := 1/(2*(f_max - f_min)*η_kp(α_kp, γ)*T_kp(γ, L_kp)*δ)
# Gold NICA | arc | full
ν(f_max, f_min, γ, α_pk, L_pk, α_kp, L_kp, δ) := W/N*(1 - 1/M_pk(f_max, f_min, γ, α_pk, L_pk, δ)^2)^2/M_kp(f_max, f_min, γ, α_kp, L_kp, δ)
1/sqrt(0.0352994) = 5.32251
1/sqrt(0.00742313) = 11.6066
1/sqrt(0.00412617) = 15.5678
τ(f_max, f_min, γ, α_pk, L_pk, α_kp, L_kp, δ) := 1/ν(f_max, f_min, γ, α_pk, L_pk, α_kp, L_kp, δ)
1/sqrt(0.0199123) = 7.08662
1/sqrt(0.007763) = 11.3497
1/sqrt(0.0043499) = 15.1621
E_tr1 := E_kin(γ_tr(α_2))
E_tr2 := E_kin(γ_tr(α_4))
E_exp := 12.6
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β_1x := 16.6472
β_2x := 25.1153
β_3x := 20.8832
D_1x := 0.887978
D_2x := 0.301642
D_3x := 0.10977
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1*D_1x^2/β_1x^2 = 0.00284526
D_2x^2/β_2x^2 = 0.000144247
D_3x^2/β_3x^2 = 2.76295e-5
sqrt(β_1x)*D_1x^2/β_1x^2 = 0.0116089
sqrt(β_2x)*D_2x^2/β_2x^2 = 0.000722896
sqrt(β_3x)*D_3x^2/β_3x^2 = 0.000126262
D_1x/D_2x = 2.94381
D_1x/D_3x = 8.08944
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