C_ring := 503.04
L_arc := 142*2 = 284
L_str := 2*145 = 290
L_str := C_ring - L_arc = 219.04
L_s := (C_ring - L_str)/(4 + 4) = 35.5
γ_tr_a := 10
S := 4
L_s := □
γ_tr_t := γ_tr_a*sqrt((S*L_s + L_str)/(S*L_s)) = 15.9453
