# Распределение частиц и плотность распределения
T_0 := 1700
T_1 := 80
T_2 := (T_0 - 2*T_1)/2
# [component: outputs D]
# [component: outputs PS]
τ_max := T_2/2 + T_1 = 465
rows(D) = 32
cols(D) = 3
rows(PS) = 7
cols(PS) = 6
j := 0 .. rows(D) - 1
i := 0 .. rows(PS) - 1
n_bin[j] := D[j, 1]
τ_bin.[j] := D[j, 1]
N_p[j] := D[j, 2]
ρ[j] := D[j, 3]  # error: Индекс массива является недопустимым для этого массива.
Dir[j] := D[j, 4]  # error: Индекс массива является недопустимым для этого массива.
n_part[i] := PS[i, 0]
τ[i] := PS[i, 2]
ΔE[i] := PS[i, 2]
Distr(x) := sqrt((x - 1)/(-2))
z_1[i] := PS[i, 4]
z_2[i] := PS[i, 5]
e = 2.71828
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A := 2/(e - e^-1)
C := -A/2*(e + e^-1)
exp(x) := A*e^x + C
sqrt(x)
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sum(N_p[j], j = 0 .. rows(D) - 1) = 1
sum(ρ[j], j = 0 .. rows(D) - 1) =  # error: Эта переменная не определена.
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x[j] := |j - 16|
x[j] := (j - 16)^3
x[0] := 3
x[1] := 3
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rows(D) = 32
x[j] := sin(j)
x[j] := (-1*(j - 1/2*(rows(D) - 1))^2 + 240.25)/10
x := [
    0; 1; 2; 3; 4; 5; 6; 7; 8; 10
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]
M[j] := x[j]/sum(x[j], j = 0 .. rows(D) - 1)
sum(x[j], j = 0 .. rows(D) - 1) = 549
sum(M[j], j = 0 .. rows(D) - 1) = 1
s[j, 0] := j
s[j, 1] := x[j]
s[j, 2] := M[j]
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# [component: inputs s]
x = [
    0; 1; 2; 3; 4; 5; 6; 7; 8; 10
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]
M = [
    0; 0.00182149; 0.00364299; 0.00546448; 0.00728597; 0.00910747; 0.010929; 0.0127505; 0.0145719; 0.0182149
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]
i := sqrt(-1)
ρω := CFFT(N_p)
Real(x) := 2*sum(ρω[n]*e^(i*n*x), n = 0 .. rows(D) - 1) - ρω[0]
N_p = [
    0.046875; 0.0234375; 0.0234375; 0.0390625; 0.015625; 0.015625; 0.0234375; 0.0234375; 0.0234375; 0.03125
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]
ρω = [
    0.03125; -0.000380835 + 0.00157497i; 0.00143973 + 0.00065403i; 0.00391273 + 0.00201616i; -0.000446393 - 0.000446393i; -2.24931e-5 + 0.00163831i; 0.00122876 + 0.000462064i; -0.00127872 + 0.00251447i; -0.00195312 + 0.00146484i; -1.92934e-5 + 0.000534942i
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]
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ρω := FFT(M)
Tl(y) := 2*sum(ρω[n]*e^(π*1*i/sqrt(8*32)*n*y), n = 0 .. 16) - ρω[0]
Tl(16) = 0.0728028 - 0.00535849i
Re(Tl(0)) = -5.69217e-5
integral(Tl(y), y = 0 .. 32) = 1
ρω = [
    0.03125;
    -0.0184918 + 0.00235797i;
    0.00472424 - 0.00130386i;
    -0.000582538 - 0.000936859i;
    -0.00109246 + 0.00113962i;
    0.000704984 - 6.45408e-5i;
    -0.000776482 - 0.000416924i;
    0.000287531 + 0.000378749i;
    -0.000113843 - 0.000398452i;
    -0.000154779 + 0.000377631i;
    0.000135838 - 0.000181146i;
    -0.000155467 - 8.48992e-5i;
    -4.59706e-5 + 0.000228872i;
    0.000102485 - 0.000168404i;
    -0.000212917 + 7.03484e-5i;
    7.46445e-5 - 4.19483e-5i;
    -5.69217e-5
]
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