ϕ_0 := 0
ϕ_1 := -π
ϕ_2 := π
λ := 1/(ϕ_1^2*(ϕ_2 - ϕ_1) - 1/3*(ϕ_2^3 - ϕ_1^3))
ξ := λ*ϕ_1^2 = 0.238732
f(ϕ) := ξ - λ*ϕ^2
f(ϕ_1) = 0
integral(f(ϕ), ϕ = ϕ_1 .. ϕ_2) = 1
df(ϕ) := -2*λ*ϕ
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T_1 := 40
T_2 := 405
φ_1 := (2*π)*(2*T_1)/(T_2 + 2*T_1) = 1.0364
A := [
    (-π)^3, (-π)^2, (-π)^1, 1, 0;
    (-π + φ_1)^3, (-π + φ_1)^2, (-π + φ_1)^1, 1, 0.224;
    3*(-π + φ_1)^2, 2*(-π + φ_1)^1, 1, 0, 0;
    3*(-π)^2, 2*(-π), 1, 0, 0.6
]
Ag := rref(A) = [1, 0, 0, 0, 0.156159; 0, 1, 0, 0, 0.939538; 0, 0, 1, 0, 1.8796; 0, 0, 0, 1, 1.47399]
poli(φ) := Ag[0, 4]*φ^3 + Ag[1, 4]*φ^2 + Ag[2, 4]*φ^1 + Ag[3, 4]*φ^0
χ_1(φ) := poli(φ)
χ_2(φ) := 0.225
1.7*f(-π + φ_1) = 0.223605
χ(φ) := χ_1(φ)*(-π ≤ φ ≤ -π + φ_1) + χ_2(φ)*(-π + φ_1 < φ < π - φ_1) + poli(-φ)*(π - φ_1 < φ ≤ π)
integral(χ(φ), φ = ϕ_1 .. ϕ_2) = 1.28692
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