f(x) := 4
i := sqrt(-1)
p := 0, 1 .. 255
y(p) := -2*π + 4*π/255*p
y(0) = -6.28319
f(y(0)) = 4
f(y(255)) = 4
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s[p, 0] := p
s[p, 1] := y(p)
s[p, 2] := f(y(p))
ρ[p] := f(y(p))
# [component: inputs s]
ρω := CFFT(ρ)
# [component: outputs h]
rows(h) = 32
cols(h) = 3
e^(i*π) = -1
Real(x) := 2*sum(ρω[n]*e^(i*n/2*(x - 2*π)), n = 0 .. 128) - ρω[0]
j := 0 .. rows(h) - 1
a[j] := h[j, 0]
c_1[j] := h[j, 1]
c_2[j] := h[j, 2]
Real(0) = 4
Real(2*π) = 4
Func(x) := 1*sum((c_1[k] + c_2[k])*e^(i*π*x/sqrt(32*8)*k), k = 0 .. rows(h) - 1)
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ρω = [
    4; 0; 0; 0; 0; 0; 0; 0; 0; 0
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]
ρ = [
    4; 4; 4; 4; 4; 4; 4; 4; 4; 4
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]
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# [component: outputs d]
# [component: outputs harm]
# [component: outputs y]
# [component: outputs q]
rows(d) = 1280
cols(d) = 5
N_turn := 30
rows(y) = 40
cols(y) = 6
rows(q) = 80000
cols(q) = 6
rows(harm) = 17
cols(h) = 3
j := 0 + (N_turn - 1)*32 .. N_turn*32 - 1
k := 0 .. rows(harm) - 1
N := 2*(rows(harm) - 1) = 32
i := 0 .. rows(y) - 1
ii := 0 + 2000*(N_turn - 1) .. 2000*N_turn - 1
a[k] := harm[k, 0]
bin[j] := d[j, 0]
count[j] := d[j, 1]
Distr[j] := d[j, 2]
φ_bin[j] := d[j, 3]
c_0[i] := y[i, 0]
c_1[i] := y[i, 1]
c_2[i] := y[i, 2]
c_3[i] := y[i, 3]
c_4[i] := y[i, 4]
c_5[i] := y[i, 5]
ϕ_der[ii] := q[ii, 2]
dis[ii] := q[ii, 3]
deriv[ii] := q[ii, 4]
V_sc[ii] := q[ii, 5]
A[k] := harm[k, 1]
j_min := (N_turn - 1)*32 = 928
B[k] := harm[k, 2]
ψ(ϕ, i) := c_0[i] + c_1[i]*ϕ + c_2[i]*ϕ^2 + c_3[i]*ϕ^3 + c_4[i]*ϕ^4 + c_5[i]*ϕ^5
j_max := N_turn*32 - 1 = 959
sum(Distr[j], j = (N_turn - 1)*32 .. N_turn*32 - 1) = 1
sum(count[j], j = (N_turn - 1)*32 .. N_turn*32 - 1) = 2000
dψ(ϕ, i) := c_1[i] + 2*c_2[i]*ϕ + 3*c_3[i]*ϕ^2 + 4*c_4[i]*ϕ^3 + 5*c_5[i]*ϕ^4
j_max - j_min = 31
Func(x) := 1/1*sum(A[k]*cos(2*π*k*x/N) + B[k]*sin(2*π*k*x/N), k = 0 .. N/2)
Func(0) = -1.44775e-8
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count[N_turn*32 - 1] = 0
Func(16) = 0.0602901
N_turn = 30
turn := N_turn*1000 = 30000
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integral(Func(x), x = 0 .. N) = 1
# [component: outputs der]
rows(der) = 2000
cols(der) = 4
DFunc(x) := 1/1*sum(2*π*k/N*(-1*A[k]*sin(2*π*k*x/N) + B[k]*cos(2*π*k*x/N)), k = 0 .. N/2)
j := 0 .. rows(der) - 1
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num[j] := der[j, 0]
φ[j] := der[j, 1]
Dis[j] := der[j, 2]
Der[j] := der[j, 3]
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n := 32
x := [1; 2; 3; 4; 5]
f := [1; 3; 6; 8; 10]
x := bin
f := count
sum(x[i], i = 0 .. n - 1) = 0
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A := [
    sum(x[i]^0, i = 0 .. n - 1), sum(x[i], i = 0 .. n - 1), sum(x[i]^2, i = 0 .. n - 1), sum(x[i]^3, i = 0 .. n - 1), sum(x[i]^4, i = 0 .. n - 1), sum(f[i], i = 0 .. n - 1);
    sum(x[i], i = 0 .. n - 1), sum(x[i]^2, i = 0 .. n - 1), sum(x[i]^3, i = 0 .. n - 1), sum(x[i]^4, i = 0 .. n - 1), sum(x[i]^5, i = 0 .. n - 1), sum(f[i]*x[i], i = 0 .. n - 1);
    sum(x[i]^2, i = 0 .. n - 1), sum(x[i]^3, i = 0 .. n - 1), sum(x[i]^4, i = 0 .. n - 1), sum(x[i]^5, i = 0 .. n - 1), sum(x[i]^6, i = 0 .. n - 1), sum(f[i]*x[i]^2, i = 0 .. n - 1);
    sum(x[i]^3, i = 0 .. n - 1), sum(x[i]^4, i = 0 .. n - 1), sum(x[i]^5, i = 0 .. n - 1), sum(x[i]^6, i = 0 .. n - 1), sum(x[i]^7, i = 0 .. n - 1), sum(f[i]*x[i]^3, i = 0 .. n - 1);
    sum(x[i]^4, i = 0 .. n - 1), sum(x[i]^5, i = 0 .. n - 1), sum(x[i]^6, i = 0 .. n - 1), sum(x[i]^7, i = 0 .. n - 1), sum(x[i]^8, i = 0 .. n - 1), sum(f[i]*x[i]^4, i = 0 .. n - 1)
] = [32, 0, 0, 0, 0, 0; 0, 0, 0, 0, 0, 0; 0, 0, 0, 0, 0, 0; 0, 0, 0, 0, 0, 0; 0, 0, 0, 0, 0, 0]
Ag := rref(A) = [1, 0, 0, 0, 0, 0; 0, 0, 0, 0, 0, 0; 0, 0, 0, 0, 0, 0; 0, 0, 0, 0, 0, 0; 0, 0, 0, 0, 0, 0]
c := submatrix(Ag, 0, 4, 5, 5) = [0; 0; 0; 0; 0]
c := [-47.9228309232; 28.3052329386; -2.19269801661; 0.0809068900085; -0.00122586196983]
c := [0.0473671875; -9.81803279205e-18; -0.00246740972516; 1.54548144261e-18; -0.000412376034542]
φ(u) := c[0] + c[1]*u + c[2]*u^2 + c[3]*u^3 + c[4]*u^4
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c1 := [c[1]; 2*c[2]; 3*c[3]; 4*c[4]] = [0; -0.00493482; 0; -0.0016495]
dφ(u) := c[1] + 2*c[2]*u + 3*c[3]*u^2 + 4*c[4]*u^3
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