## Fundamental constants and equations
c := 2.988*10^8  # m/s
# speed of light
β(γ) := sqrt(1 - 1/γ^2)
m_p := 0.938*10^9  # eV  # proton mass
# Ring | RF | 4 RF Station each 25kV | Experement
C_ring := 503.04  # m
# Acc Lenght
V_max := 100  # kV
E_exp := 12.6*10^9  # eV  # Energy of Experiment
h := 22  # harmonic number
φ_acc := 30
E_inj := 1.32*10^9  # eV  # Injection Energy
eV
E_inj := 4.7*10^9  # eV  # Injection Energy in simulation
U := V_max*sin(φ_acc*π/180)*10^3 = 50000  # Accelerating Voltage
α_0 := 0.01991272251  # MCFs
α_1 := -0.06371671224
α_2 := 0.0
# Energy, eV
# Gamma
# Momentum, eV/c
γ_tr := 1/sqrt(α_0) = 7.08655
β(γ_tr) = 0.989994  # Transition Energy
# Kin. Energy, | eV | Gamma | Momentum, | eV/c | Total Energy, | eV
E_kin(n) := U*n + E_inj
γ(n) := E_kin(n)/m_p + 1
p(n) := sqrt((E_kin(n) + m_p)^2 - m_p^2)
E_beam(n) := sqrt((E_kin(n) + m_p)^2)
E_kin(0) = 4700000000  # eV
γ(0) = 6.01066
p(0) = 5.55942e9
E_beam(0) = 5638000000
E_kin(40000) = 6700000000  # eV
γ(40000) = 8.14286
E_beam(40000) = 7638000000
p(40000) = 7.58018e9
n_tr := ((γ_tr - 1)*m_p - E_inj)/U = 20183.6
n_exp := (E_exp - E_inj)/U = 158000
E_kin(n_tr) = 5.70918e9
γ(n_tr) = 7.08655
p(n_tr) = 6.58067e9
E_beam(n_tr) = 6.64718e9
E_kin(n_exp) = 12600000000
γ(n_exp) = 14.4328
p(n_exp) = 1.35055e10
E_beam(n_exp) = 13538000000
T_s := C_ring/(β(γ_tr)*c) = 1.70055e-6  # c
β(γ(n_tr)) = 0.989994
## Ring and Beam parameters
## Transition JUMP
Δγ_tr := 0.09
# Here is a 4 different states of longitudinal
# optics based on transition energy:
# 1) acceleration from injection energy with initial value;
# 2) smooth increase to peak
# 3) jump
# 4) initial value till the experiment energy
#
# 1.First defines 3) state based on the maximum availiable
# speed of transition shift and availiable transition size
# 2.Secondly, we can understand states 3
# 3.Finally, states 3 and 5 also can be understand
Q := 9.44
γ1 := E_inj/m_p + 1 = 6.01066
γ2 := (E_inj + U)/m_p + 1 = 6.01071
dγdt_acc := 31.346  # 1/c
dγdt := 8.5
# rate of transition
# change
γ_p := (γ2 - γ1)/T_s = 31.3457  # длительность процедуры
36  # милисекунд
T_s = 1.70055e-6
1/T_s = 588045
# Kin. Energy, | eV | Gamma | Momentum, | eV/c | Total Energy, | eV
γ(n_tr) = 7.08655
Δn := n_tr - ((γ_tr - Δγ_tr/2 - 1)*m_p - E_inj)/U = 844.2
E_kin(n_tr) = 5.70918e9  # eV
γ(n_tr) = 7.08655
p(n_tr) = 6.58067e9
E_beam(n_tr) = 6.64718e9
γ(n_tr + Δn) = 7.13155
γ_tr + Δγ_tr = 7.17655
E_kin(n_tr - Δn) = 5.66697e9  # eV
γ(n_tr - Δn) = 7.04155
p(n_tr - Δn) = 6.53803e9
E_beam(n_tr - Δn) = 6.60497e9
E_kin(n_tr - Δn)*(10^-9*10^2) = 566.697
Δn_jump := Δγ_tr/(T_s*dγdt) = 6226.36
E_kin(n_tr + Δn) = 5.75139e9  # eV
γ(n_tr + Δn) = 7.13155
p(n_tr + Δn) = 6.6233e9
E_beam(n_tr + Δn) = 6.68939e9
T_s*dγdt*Δn_jump = 0.09
γ(n_tr - Δn_jump/2)*100 = 692.06
E_kin(n_tr + Δn) - E_kin(n_tr - Δn) = 84420000  # eV
# (84 MeV in)
2*Δn = 1688.4  # turns
T_s*Δn_jump*10^3 = 10.5882  # ms
E_kin(n_tr - Δn_jump/2) = 5.55352e9  # eV
γ(n_tr - Δn_jump/2) = 6.9206
p(n_tr - Δn_jump/2) = 6.4234e9
E_beam(n_tr - Δn_jump/2) = 6.49152e9
E_kin(n_tr - Δn_jump/2)*10^-9*10^2 = 555.352
T_s*dγdt_acc*Δn*10^3 = 45.0005
E_kin(n_tr + Δn_jump/2) = 5.86484e9  # eV
γ(n_tr + Δn_jump/2) = 7.25249
p(n_tr + Δn_jump/2) = 6.73786e9
E_beam(n_tr + Δn_jump/2) = 6.80284e9
E_kin(n_tr + Δn_jump/2)*10^-9*10^2 = 586.484
E_kin(n_tr + Δn_jump/2) - E_kin(n_tr - Δn_jump/2) = 311317860  # eV
# (1.8 MeV in)
2*Δn_jump/2 = 6226.36  # turns
γ_inc(n) := dγdt/3*T_s*(n - n_tr + 2*Δn_jump) + γ_tr
γ_inc1(n) := dγdt/3*T_s*(n - n_tr - 2*Δn_jump) + γ_tr
γ_jump1(n) := dγdt*T_s*(n - n_tr)
γ_tran1(n) := γ_tr*(n ≤ n_tr - 2*Δn_jump) + γ_inc(n)*(n_tr - 2*Δn_jump ≤ n < n_tr - Δn_jump/2) + (γ_tr - γ_jump1(n))*(n_tr - Δn_jump/2 < n < n_tr + Δn_jump/2) + (γ_inc1(n)*(n_tr + Δn_jump/2 ≤ n < n_tr + 2*Δn_jump) + γ_tr*(n > n_tr + 2*Δn_jump))
α_0(n) := 1/γ_tran1(n)^2
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α_0(n_1 + Δn_21) =  # error: Эта переменная не определена.
α_0(n_1)*1000 =  # error
α_0(n_1 + Δn_21)*100000 =  # error
α_0(n_1 + Δn_21 + Δn_32)*1000 =  # error
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(α_0(n_1) - α_0(n_1 + Δn_21)) =  # error
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0.01120 - 0.00927578 = 0.00192422
## Threashold curent
m_0 := 1.67*10^-27  # kg
c = 298800000  # m/s
e := 1.602*10^-19
γ_tr := 7.086
β(γ_tr) = 0.989992
h := 22
σ_p := 3.3*10^-3
η := 2.5*10^-4
Z_imp := 20
I_th := 2*π*m_0*c^2*β(γ_tr)^2*γ_tr*η*σ_p^2/(e*Z_imp) = 5.52837  # A
I_th/2/(h*e)*T_s = 1.33374e12
γ := 7.087
β := 0.99
L_b := 503.04/10 = 50.304
A := 1
Z := 1
N_p := 2.2*10^13
N_p/22 = 1000000000000
ε_exp := 1.5*10^-3*0.6*10^3 = 0.9  # мм мрад
K_1 := 1
K_2 := 5.4
ε_exp*3.1415*22*14.33*0.999*1/1000 = 0.890459  # м
E_0 := 5.7*10^9
Z_n := 20
ε_exp*22*14.33*0.999*1/1000 = 0.28345
I := e*β*c*N_p*Z/(2*sqrt(3)*L_b) = 5.98285
σ_p := 3.3*10^-3
1.5*10^-3*0.6*10^3 = 0.9
η := 2.5*10^-4
22*1.5*10^-3*0.6*14.33*3.14159 = 0.891376
K_1*K_2*E_0/(Z_n*I)*A/Z*γ*β^2*η*σ_p^2 = 4.86442
ε_tr1 := γ*β*sqrt(π)*σ_p*L_b = 2.06438
D_gym := 1.3
ε_tr := 0.9/D_gym = 0.692308
ε_tr/(γ*β*σ_p*sqrt(π)) = 16.8699
2.8*10^-3*1.08*10^3 = 3.024
ε_tr/(L_b*γ*β*sqrt(π)) = 0.00110669
K_1*K_2*E_0/(Z_n*e*c)*η*ε_tr^2/(sqrt(π)*β*γ*L_b) = 6.15827e12
2*10^-3*0.76 = 0.00152
K_1*K_2*E_0/(Z_n*e*c)*η*ε_tr*σ_p = 1.83632e13
L_b*2*sqrt(3) = 174.258
A := 22*1.52*10^-3*3.14 = 0.105002
K := A*(1*14.3)/(D_gym*(1*γ)*σ_p*C_ring/4) = 0.392708
N_p1(L_b) := K_1*K_2*E_0/(Z_n*e*c)*η*ε_tr^2*4/(π*β*γ*L_b)
N_p/(1*10^13) = 2.2
N_p2(L_b) := K_1*K_2*E_0/(Z_n*e*c)*η*ε_tr^2/(β*γ*L_b)
2*10^-3*0.76*3.14159*22*7.087 = 0.744523
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K_1*K_2*η*E_0*3.3*10^-3/(D_gym*e*c*Z_n)*0.745*1/K = 3.87073e13
ε_tr*2/(C_ring/2*γ*β*sqrt(π)) = 0.000442674
ε_tr*2/(C_ring/10*γ*β*sqrt(π)) = 0.00221337
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ε_tr*2/(C_ring/16*γ*β*sqrt(π)) = 0.00354139
N_p1(C_ring/2) = 2.77955e12
N_p1(C_ring/5) = 6.94886e12
N_p1(C_ring/10) = 1.38977e13
N_p1(C_ring/16) = 2.22364e13
C_ring/16 = 31.44
## Relevant Times
# Beam Params | Ring Params | RF Params | Experem Params
A := 1
Z := 1
C := 503.04
h := 22
E_inj := 4.7  # GeV
m_0 := 1.67*10^-27  # kg
V := 25*4*10^3
R_0 := C/(2*π) = 80.0613
V - amplitude
E_tr := 5.7  # GeV
m_0eV := 0.938
φ_s := 30*π/180
# GeV
γ_t := 7.086
c = 298800000  # m/s  # m
E_tr - E_inj = 1  # Harmonic 100kV
α_1 := 0.0199
V*|sin(φ_s)| = 50000
e := 1.6*10^-19
# eV per turn
(E_tr - E_inj)*10^9/(V*|sin(φ_s)|) = 20000  # increase
T_s*10^3*2*6226 = 21.1753  # ms
δ := 3*10^-3
# jump
T_s*10^3*6226 = 10.5876  # ms
β_s := β(γ_tr)  # error: Значение должно быть функцией, но имеет форму: Unitless.
# procedure
T_s*10^3*5*6226 = 52.9381  # ms
ω_0 := β_s*c/R_0
T_s := (2*π/ω_0)
# s
γ1 := E_inj/m_0eV + 1 = 6.01066
γ2 := (E_inj + (V*|sin(φ_s)|)/10^9)/m_0eV + 1 = 6.01071
γ_p := (γ2 - γ1)/T_s
# Adiabatic Time
T_ad := (π*β_s^2*m_0*c^2*γ_t^4/(γ_p*ω_0^2*h*e*V*|cos(φ_s)|))^(1/3)
# s
T_ad*10^3 =  # error  # ms
4*T_ad*10^3 =  # error  # ms
Δγ_t := 2*γ_p*T_ad
T_ad/T_s =  # error
V*|sin(φ_s)|*10^-9*T_ad/T_s =  # error  # GeV
# Non-linear time
T_nl := (3/2*β_s^2 - α_1*γ_t^2)*δ*γ_t/(2*γ_p)  # s
T_nl*10^3 =  # error  # ms
Δγ_t := 2*γ_p*T_nl
T_nl/T_s =  # error
G := e^(2/3*(T_nl/T_ad)^(3/2))
# Even if transition is crossed in NICA, the emittance growth can influence on luminocity at final energy. Moreover longitudinal instability can apper
## Luminocity
# Low energy incertion 2-3 GeV, transition crossing
E_exp = 12600000000
C = 503.04
γ_exp := γ(n_exp)  # error: Значение должно быть функцией, но имеет форму: Unitless.
n_b := 22
C/(n_b*3) = 7.62182  # м  # separatrix in meters
σ_s := 0.6  # м
σ_p := 1.5*10^-3
C/(β(γ_exp)*c*n_b*3) =  # error  # с  # separatrix in seconds
ε_exp := n_b*γ_exp*β(γ_exp)*σ_s*σ_p
# lenght of beam in seconds
σ_s/(C/(n_b*3))*C/(β(γ_exp)*c*n_b*3) =  # error  # с
σ_s/(C/(n_b*3)) = 0.0787214
C/(β(γ_exp)*c*n_b*3)
