# [component: outputs H]
k := 1
m := 1
rows(H) = 3700
cols(H) = 2
A(h) := 1*(1 - h)
i := 0 .. rows(H) - 1
x[i] := H[i, 0]
v[i] := H[i, 1]
ω := sqrt(k/m)
y(t, h) := A(h)*cos(ω*t)
yp(t, h) := A(h)*ω*sin(ω*t)
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