## Beam Acceleration in NICA
# Fundamental constants and equations
## Equations of longitudinal motion
c := 2.988*10^8  # m/s
β(γ) := sqrt(1 - 1/γ^2)
# Dimensions and value at transition
dτ/dt == η*h*ΔE/(β^2*E_0)  # where
η(dp/p) == η_0 + η_1*dp/p
5700
m_p := 0.938  # GeV
# 300 | – | 5000
V(τ)  # – Voltage
d(ΔE)/dt == V(τ)/T_0  # where
1
T_0 == C_ring/(β*c)
1
## RF voltage
5.1*10^-4
V_bb := 5000  # V
T_1 := 40  # ns
T_s = 1.7e-6  # s  # taking into account
[E_0, MeV; V, V; β, 1; n, 1; η_0, 1; η, 1; ΔE, MeV; τ, ns; T_0, ns; dp/p, 1]
dt == T_0*dn
0 + (-0.04)*3*10^-3 = -0.00012
V_aa := 300  # V
T_2 := (T_s*10^9 - 2*T_1)/(2*2) = 405  # ns
10
ω_0 == 2*π/T_0
τ == ϕ/ω_0
τ == T_0*ϕ/(2*π)
# from | -382 | to | 382
1688
V_τ(τ) := -V_bb*(-T_1 - T_2/2 < τ < -T_2/2) + V_aa*(-T_2/2 ≤ τ < T_2/2) + V_bb*(T_2/2 ≤ τ < T_1 + T_2/2)  # Equations in program
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10^-3
dτ/dn == η(dp/p)*T_0*h*ΔE/(β^2*E_0)
d(ΔE)/dn == V(τ)
also
γ < γ_tr
η_0 < 0
E_0 == E_0 + V_acc*N_turn
η_0 == α_0 - 1/γ^2  # when
γ > γ_tr
η_0 > 0
γ == E_0/m_p + 1
η_1 == α_1 - η_0/γ^2 + 3*β^2/(2*γ^2)
β == sqrt(1 - 1/γ^2)
## Ring and Beam parameters
C_ring := 503.04  # m
E_exp := 12.6  # GeV
α_0 := 0.0199123143
E_inj := 5.664  # GeV
# Для синусной волны
α_1 := -0.06872168475
U := 300*10^-9  # GeV
V_0 := 2000  # V  # За период в 1000 оборотов
γ_tr := 1/sqrt(α_0) = 7.08662
5000*1000*10^-6 = 5  # MeV
E_kin(n) := U*n + E_inj
γ(n) := E_kin(n)/m_p + 1
p(n) := sqrt((E_kin(n) + m_p)^2 - m_p^2)
V_1(τ) := V_0*sin(2*π*τ/T_s)
-5.0*10^-3*1688*5/(0.98^2*5700)*1000 = -7.70878  # ns
n_exp := (E_exp - E_inj)/U = 23120000
γ(n_exp) = 14.4328
p(n_exp) = 13.5055
n_tr := ((γ_tr - 1)*m_p - E_inj)/U = 150831
γ(n_tr) = 7.08662
p(n_tr) = 6.58074
E_kin(n_tr) = 5.70925
n_inj := 0
γ(n_inj) = 7.03838
p(n_inj) = 6.53503
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## Revolution frequancy
τ_ac := 50  # s
T_0(n) := C_ring/(β(γ(n))*c)
γ(n_inj) = 7.03838
γ(n_exp) = 14.4328
T_0(0) = 1.70079e-6
T_rev := τ_ac*U/(m_p*(γ(n_exp) - γ(n_inj))) = 2.16263e-6  # s
T_0(n_exp) = 1.68759e-6
T_s ≡ 1.700*10^-6
f_0.ac := 1/T_rev = 462400  # Hz
f_0(n) := 1/T_0(n)
1.688*10^-6*10^9 = 1688
f_0(0)*10^-6 = 0.587963  # MHz
f_0(n_exp)*10^-6 = 0.592561  # MHz
τ_0 := (E_exp - E_inj)/(U*f_0(n_exp)) = 39.0171
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## Second order slip-factor
Δs/C == (α - 1/γ^2)*Δp/p + (α_p + 3/2*β^2/γ^2)*(Δp/p)^2
ΔT/T == η_0*(Δp/p) + η_1*(Δp/p)^2 + ...
α_1*α_0 = -0.00136841
η_0(γ) := α_0 - 1/γ^2
η_0(γ_tr) = -6.93889e-18
η_0(γ(n_inj)) = -0.000273889
γ(n_inj) = 7.03838
α_1 = -0.0687217
η_1(γ) := α_1 - η_0(γ)/γ^2 + 3*β(γ)^2/(2*γ^2)
η_1(γ_tr) = -0.039448
3/2*β(γ_tr)^2/γ_tr^2 = 0.0292737
β(γ_tr) = 0.989994
η(γ, dp_p) := η_0(γ) + η_1(γ)*dp_p
η_1(1.2) = 0.71799
β(2) = 0.866025
γ_tr = 7.08662
γ_tr - 0.1 = 6.98662
η(γ_tr, 3*10^-3) = -0.000118344
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η_0(γ_tr - 0.045) = -0.000255315
dp_p := 3*10^-3
η_1(γ_tr - 0.045)*dp_p = -0.000117226
η_1(γ_tr - 0.09) = -0.0386953
η_0(γ_tr + 0.045) = 0.000250498
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