## Beam Acceleration in NICA
# Fundamental constants and equations
## Equations of longitudinal motion
c := 2.988*10^8  # m/s
β(γ) := sqrt(1 - 1/γ^2)
# Dimensions and value at transition
dτ/dt == η*h*ΔE/(β^2*E_0)  # where
η(dp/p) == η_0 + η_1*dp/p
5700
m_p := 0.938  # GeV
# 300 | – | 5000
V(τ)  # – Voltage
d(ΔE)/dt == V(τ)/T_0  # where
1
T_0 == C_ring/(β*c)
1
## RF voltage
5.1*10^-4
V_bb := 5000  # V
T_1 := 40  # ns
T_s = 1.7e-6  # s  # taking into account
[E_0, MeV; V, V; β, 1; n, 1; η_0, 1; η, 1; ΔE, MeV; τ, ns; T_0, ns; dp/p, 1]
dt == T_0*dn
0 + (-0.04)*3*10^-3 = -0.00012
V_aa := 300  # V
T_2 := (T_s*10^9 - 2*T_1)/(2*2) = 405  # ns
10
ω_0 == 2*π/T_0
τ == ϕ/ω_0
τ == T_0*ϕ/(2*π)
# from | -382 | to | 382
1688
V_τ(τ) := -V_bb*(-T_1 - T_2/2 < τ < -T_2/2) + V_aa*(-T_2/2 ≤ τ < T_2/2) + V_bb*(T_2/2 ≤ τ < T_1 + T_2/2)  # Equations in program
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10^-3
dτ/dn == η(dp/p)*T_0*h*ΔE/(β^2*E_0)
d(ΔE)/dn == V(τ)
also
γ < γ_tr
η_0 < 0
E_0 == E_0 + V_acc*N_turn
η_0 == α_0 - 1/γ^2  # when
γ > γ_tr
η_0 > 0
γ == E_0/m_p + 1
η_1 == α_1 - η_0/γ^2 + 3*β^2/(2*γ^2)
β == sqrt(1 - 1/γ^2)
## Ring and Beam parameters
C_ring := 503.04  # m
E_exp := 12.6  # GeV
α_0 := 0.0199123143
E_inj := 5.664  # GeV
# Для синусной волны
α_1 := -0.06872168475
U := 300*10^-9  # GeV
V_0 := 2000  # V  # За период в 1000 оборотов
γ_tr := 1/sqrt(α_0) = 7.08662
5000*1000*10^-6 = 5  # MeV
E_kin(n) := U*n + E_inj
γ(n) := E_kin(n)/m_p + 1
p(n) := sqrt((E_kin(n) + m_p)^2 - m_p^2)
V_1(τ) := V_0*sin(2*π*τ/T_s)
-5.0*10^-3*1688*5/(0.98^2*5700)*1000 = -7.70878  # ns
n_exp := (E_exp - E_inj)/U = 23120000
γ(n_exp) = 14.4328
p(n_exp) = 13.5055
n_tr := ((γ_tr - 1)*m_p - E_inj)/U = 150831
γ(n_tr) = 7.08662
p(n_tr) = 6.58074
E_kin(n_tr) = 5.70925
n_inj := 0
γ(n_inj) = 7.03838
p(n_inj) = 6.53503
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## Revolution frequancy
τ_ac := 50  # s
T_0(n) := C_ring/(β(γ(n))*c)
γ(n_inj) = 7.03838
γ(n_exp) = 14.4328
T_0(0) = 1.70079e-6
T_rev := τ_ac*U/(m_p*(γ(n_exp) - γ(n_inj))) = 2.16263e-6  # s
T_0(n_exp) = 1.68759e-6
T_s ≡ 1.700*10^-6
f_0.ac := 1/T_rev = 462400  # Hz
f_0(n) := 1/T_0(n)
1.688*10^-6*10^9 = 1688
f_0(0)*10^-6 = 0.587963  # MHz
f_0(n_exp)*10^-6 = 0.592561  # MHz
τ_0 := (E_exp - E_inj)/(U*f_0(n_exp)) = 39.0171
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## Second order slip-factor
Δs/C == (α - 1/γ^2)*Δp/p + (α_p + 3/2*β^2/γ^2)*(Δp/p)^2
ΔT/T == η_0*(Δp/p) + η_1*(Δp/p)^2 + ...
α_1*α_0 = -0.00136841
η_0(γ) := α_0 - 1/γ^2
η_0(γ_tr) = -6.93889e-18
η_0(γ(n_inj)) = -0.000273889
γ(n_inj) = 7.03838
α_1 = -0.0687217
η_1(γ) := α_1 - η_0(γ)/γ^2 + 3*β(γ)^2/(2*γ^2)
η_1(γ_tr) = -0.039448
3/2*β(γ_tr)^2/γ_tr^2 = 0.0292737
β(γ_tr) = 0.989994
η(γ, dp_p) := η_0(γ) + η_1(γ)*dp_p
η_1(1.2) = 0.71799
β(2) = 0.866025
γ_tr = 7.08662
γ_tr - 0.1 = 6.98662
η(γ_tr, 3*10^-3) = -0.000118344
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η_0(γ_tr - 0.045) = -0.000255315
dp_p := 3*10^-3
η_1(γ_tr - 0.045)*dp_p = -0.000117226
η_1(γ_tr - 0.09) = -0.0386953
η_0(γ_tr + 0.045) = 0.000250498
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# OptiM | MADX | Differance
## γ-transition jump
G_QF := 2.291529  # kG/cm
K1_QF1 := 0.5148373645
k := G_QF/K1_QF1 = 4.45098
Δq_max := 0.05
Δq == β_avg*ΔK_1/(4*π)
Δγ_tr := 0.045
ΔG_QF := -0.015  # kG/cm
Q := 9.44
β_avg := C_ring/(2*π*Q)  # m
G_QF + ΔG_QF = 2.27653
K_1 := 1/k*(G_QF + ΔG_QF) = 0.511467
K_1 - K1_QF1 = -0.00337005
BR := 45  # T/m
ΔK_1 := 4*π*Δq_max/β_avg = 0.0740848
l_D := 0.47  # m
n_1 := 0 .. 5
N_D := 48
2.5*10^-4*2*1.7*10^-6*10^9/(1^2*5660)*0.125*6226 = 0.116875
ΔG := ΔK_1*BR/(N_D*l_D) = 0.147776
α_tr1 := [-0.07589630257; -0.0740351602; -0.07221977499; -0.07044778249; -0.06872168475]
γ_tr1 := [6.992994909; 7.016401922; 7.039803456; 7.063222502; 7.086619757]
vs := cspline(γ_tr1, α_tr1)
α_tr1.(x) := interp(vs, γ_tr1, α_tr1, x)
dγdt := 8.5
x := 6.99, 7.00 .. 7.09
n_tr = 150831
T_0(n_tr) = 1.70055e-6  # s
B := -6.11718950956*10^-1
20*10^-6*6226 = 0.12452
Δn := n_tr - ((γ_tr - Δγ_tr - 1)*m_p - E_inj)/U = 140700
A := 7.66291880313*10^-2
1/γ_tr^2 = 0.0199123
Δn_jump := 2*Δγ_tr/(T_0(n_tr)*dγdt) = 6226.36
α_tr1_app(x) := A*x + B
γ(n_tr) = 7.08662
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γ(n_tr - Δn) = 7.04162
T_0(n_tr)*dγdt*Δn_jump = 0.09
n_j1 := n_tr - Δn = 10131.1
γ(n_tr + Δn) = 7.13162
T_0(n_tr)*Δn_jump*10^3 = 10.5882  # ms
γ_tr - 2*Δγ_tr = 6.99662
n_j2 := n_tr - Δn + Δn_jump = 16357.5
γ_tr + 2*Δγ_tr = 7.17662
γ_jump(n) := dγdt*T_0(n_tr)*(n - (n_tr - Δn))
γ_jump1(n) := dγdt*T_0(n_tr)*(n - n_tr)
γ_tran(n) := γ_tr*(n ≤ n_tr - Δn) + (γ_tr - γ_jump(n))*(n_tr - Δn < n < n_tr - Δn + Δn_jump) + (γ(n) - Δγ_tr)*(n_tr - Δn + Δn_jump ≤ n < n_tr + Δn) + γ_tr*(n > n_tr + Δn)
γ_tran1(n) := γ_tr*(n ≤ n_tr - Δn) + (γ(n) + Δγ_tr)*(n_tr - Δn ≤ n < n_tr - Δn_jump/2) + (γ_tr - γ_jump1(n))*(n_tr - Δn_jump/2 < n < n_tr + Δn_jump/2) + (γ(n) - Δγ_tr)*(n_tr + Δn_jump/2 ≤ n < n_tr + Δn) + γ_tr*(n > n_tr + Δn)
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dp_p := 3.0*10^-3
α_tr1.(n) := α_1*(n ≤ n_tr - Δn) + α_tr1.(γ_tran(n))*(n_tr - Δn < n < n_tr - Δn + Δn_jump) + α_tr1.(γ_tran(n))*(n_tr - Δn + Δn_jump ≤ n < n_tr + Δn) + α_1*(n > n_tr + Δn)
α_tr0(n) := 1/γ_tran(n)^2
η_tr0(n) := α_tr0(n) - 1/γ(n)^2
η_tr1(n) := α_tr1.(n) - η_tr0(n)/γ(n)^2 + 3*β(γ(n))^2/(2*γ(n)^2)
η_tr(n) := η_tr0(n) + η_tr1(n)*dp_p
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## Space Charge Effect
ω_0 == 2*π/T_0
h := 2
a := 5.0
ϕ_0 := 0
ϕ_1 := -π
ϕ_2 := π
b := 0.55
g_0 := 1 + 2*ln(a/b) = 5.41455
Δ_sc == e*V_sc(ϕ_n)/(A*m_0*c^2*γ_s^2)  # reletive energy gain per turn due to the space charge field
Z := 1
λ := 1/(ϕ_1^2*(ϕ_2 - ϕ_1) - 1/3*(ϕ_2^3 - ϕ_1^3))
Z_0 := 377
R_0 := C_ring/(2*π) = 80.0613
N_0 := 10^13
V_sc(ϕ_n) == Z^2*h^2*g_0*Z_0*c*e/(2*R_0*γ_s^2)*δ(N_0*f(ϕ))/δ(ϕ)
γ_s := 7.0
ξ := λ*ϕ_1^2 = 0.238732
e := 1.6*10^-19
f(ϕ) := ξ - λ*ϕ^2
n_cutoff := R_0/b = 145.566
f(ϕ_1) = 0
integral(f(ϕ), ϕ = ϕ_1 .. ϕ_2) = 1
df(ϕ) := -2*λ*ϕ
V_scpar(ϕ) := Z^2*h^2*g_0*Z_0*c*e/(2*R_0*γ_s^2)*N_0*df(ϕ)
df(ϕ_1) = 0.151982
Z_SC(β, γ) := -1i*Z_0*g_0/(2*β*γ^2)
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V_scpar(ϕ_1) = 75.6148  # Ом * m/c * Кл / м
Z = 1
e := 1.6*10^-19
Z_SC(β(γ_tr), γ_tr) = -20.5288i
h = 2
g_0 = 5.41455
Z^2*h^2*g_0*Z_0*c*e*N_0/(2*R_0*γ_s^2) = 497.526
V_sc := Z^2*h^2*g_0*Z_0*c*e/(2*R_0*γ_s^2)*N_0*1 = 497.526  # V
2.5*10^-4*2*5*10^-3*1.7*10^-6/1*10^9 = 0.00425
Z_0 = 377
c = 298800000
R_0 = 80.0613
const := g_0*Z_0*c*e/(2*R_0)*N_0 = 6094.69
γ_s = 7
V_acc := 300*10^-9  # GeV
N_tturn := 20000
V_acc*N_tturn = 0.006  # GeV
E_kin(n_tr) = 5.70925
E_kin(n_tr) - 2*V_acc*N_tturn = 5.69725
γ(n_tr) = 7.08662
(E_kin(n_tr) - 5*V_acc*N_tturn)/m_p + 1 = 7.05464
γ(n_tr) - 0.045 = 7.04162
γ(1000*30) = 7.04797
## Simulation Phase Space
E_inj = 5.664
E_kin(n_tr - Δn - Δn_jump) = 5.66517
T_2/2 + T_1 = 242.5
E_kin(1000*30) = 5.673
Δn_jump = 6226.36
# [component: outputs PS]
N_turn := 1000*30 = 30000
N_turn*300*10^-6 = 9
E_inj + 9*10^-3 = 5.673
rows(PS) = 2000
cols(PS) = 17
20*10^6*700*10^-9 = 14
Time := N_turn*T_s = 0.051  # s
E_kin(n_tr) = 5.70925
i := 0 .. rows(PS) - 1
n_turn[i] := PS[i, 0]
τ[i] := PS[i, 1]
ΔE[i] := PS[i, 2]
dpp[i] := PS[i, 3]
E[i] := PS[i, 6]
η[i] := PS[i, 5]
V[i] := PS[i, 7]
γ[i] := PS[i, 8]
γ_trans[i] := PS[i, 9]
α_0.[i] := PS[i, 10]
α_1.[i] := PS[i, 11]
η_0.[i] := PS[i, 12]
η_1.[i] := PS[i, 13]
flag[i] := PS[i, 14]
φ[i] := PS[i, 15]
V_.sc[i] := PS[i, 16]
sum(flag[i], i = 0 .. rows(PS) - 1) = 1957
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sum(flag[i], i = 0 .. rows(PS) - 1)/rows(PS) = 0.9785
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dEE[i] := PS[i, 4]
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## Twiss parameters
# [component: outputs TWi]
rows(TW) =  # error: Эта переменная не определена.
cols(TW) =  # error
j := 0 .. rows(TW) - 1
Name[j] := TW[j, 0]
s[j] := TW[j, 2]
β_x[j] := TW[j, 3]
α_x[j] := TW[j, 4]
μ_x[j] := TW[j, 5]
D_x[j] := TW[j, 11]
Dp_x[j] := TW[j, 12]
β_y[j] := TW[j, 6]
α_γ[j] := TW[j, 7]
μ_γ[j] := TW[j, 8]
D_y[j] := TW[j, 9]
Dp_y[j] := TW[j, 10]
Length[j] := TW[j, 13]
# quadrupole | sextupole
K1L[j] := TW[j, 14]
K2L[j] := TW[j, 15]
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