## Beam Acceleration in NICA
# Fundamental constants and equations
## Equations of longitudinal motion
c := 2.988*10^8  # m/s
β(γ) := sqrt(1 - 1/γ^2)
# Dimensions and value at transition
dτ/dt == η*ΔE/(β^2*E_0)  # where
η(dp/p) == η_0 + η_1*dp/p
5700
m_p := 0.938  # GeV
# 300 | – | 5000
V(τ)  # – Voltage
d(ΔE)/dt == V(τ)/T_0  # where
1
T_0 == C_ring/(β*c)
1
## RF voltage
5.1*10^-4
V_bb := 5000  # V
T_1 := 80  # ns
T_s = 1.688e-6  # s  # taking into account
[E_0, MeV; V, V; β, 1; n, 1; η_0, 1; η, 1; ΔE, MeV; τ, ns; T_0, ns; dp/p, 1]
dt == T_0*dn
0 + (-0.04)*3*10^-3 = -0.00012
V_aa := 300  # V
T_2 := (T_s*10^9 - 2*T_1)/2 = 764  # ns
10
ω_0 == 2*π/T_0
τ == ϕ/ω_0
τ == T_0*ϕ/(2*π)
# from | -382 | to | 382
# Equations in program | 1688
V_τ(τ) := -V_bb*(-T_1 - T_2/2 < τ < -T_2/2) + V_aa*(-T_2/2 ≤ τ < T_2/2) + V_bb*(T_2/2 ≤ τ < T_1 + T_2/2)
10^-3
dτ/dn == η(dp/p)*T_0*ΔE/(β^2*E_0)
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d(ΔE)/dn == V(τ)
also
γ < γ_tr
η_0 < 0
E_0 == E_0 + V_acc*N_turn
η_0 == α_0 - 1/γ^2  # when
γ > γ_tr
η_0 > 0
γ == E_0/m_p + 1
η_1 == α_1 - η_0/γ^2 + 3*β^2/(2*γ^2)
β == sqrt(1 - 1/γ^2)
## Ring and Beam parameters
C_ring := 503.04  # m
E_exp := 12.6  # GeV
α_0 := 0.0199123143
E_inj := 5.3  # GeV
α_1 := -0.07
U := 300*10^-9  # GeV
V_0 := 2000  # V  # За период в 1000 оборотов
γ_tr := 1/sqrt(α_0) = 7.08662
5000*1000*10^-6 = 5  # MeV
E_kin(n) := U*n + E_inj
γ(n) := E_kin(n)/m_p + 1
p(n) := sqrt((E_kin(n) + m_p)^2 - m_p^2)
V_1(τ) := V_0*sin(2*π*τ/T_s)
-1.617*10^-2*1688*5/(0.98^2*4000)*1000 = -35.5255  # ns
n_exp := (E_exp - E_inj)/U = 24333333
γ(n_exp) = 14.4328
p(n_exp) = 13.5055
n_tr := ((γ_tr - 1)*m_p - E_inj)/U = 1364164
γ(n_tr) = 7.08662
p(n_tr) = 6.58074
n_inj := 0
γ(n_inj) = 6.65032
p(n_inj) = 6.16707
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## Revolution frequancy
τ_ac := 50  # s
T_0(n) := C_ring/(β(γ(n))*c)
γ(n_inj) = 6.65032
γ(n_exp) = 14.4328
T_0(0) = 1.7029e-6
T_rev := τ_ac*U/(m_p*(γ(n_exp) - γ(n_inj))) = 2.05479e-6  # s
T_0(n_exp) = 1.68759e-6
T_s ≡ 1.688*10^-6
f_0.ac := 1/T_rev = 486667  # Hz
f_0(n) := 1/T_0(n)
1.688*10^-6*10^9 = 1688
f_0(0)*10^-6 = 0.587235  # MHz
f_0(n_exp)*10^-6 = 0.592561  # MHz
τ_0 := (E_exp - E_inj)/(U*f_0(n_exp)) = 41.0647
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## Second order slip-factor
Δs/C == (α - 1/γ^2)*Δp/p + (α_p + 3/2*β^2/γ^2)*(Δp/p)^2
ΔT/T == η_0*(Δp/p) + η_1*(Δp/p)^2 + ...
η_0(γ) := α_0 - 1/γ^2
η_0(γ_tr) = -6.93889e-18
η_0(γ(n_inj)) = -0.00269843
γ(n_inj) = 6.65032
η_1(γ) := α_1 - η_0(γ)/γ^2 + 3*β(γ)^2/(2*γ^2)
η_1(γ_tr) = -0.0407263
3/2*β(γ_tr)^2/γ_tr^2 = 0.0292737
η(γ, dp_p) := η_0(γ) + η_1(γ)*dp_p
η_1(1.2) = 0.716712
β(2) = 0.866025
γ_tr = 7.08662
γ_tr - 0.1 = 6.98662
η(γ_tr, 3*10^-3) = -0.000122179
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η_0(γ_tr - 0.09) = -0.000515573
dp_p := 3*10^-3
η_1(γ_tr - 0.09)*dp_p = -0.000119921
η_1(γ_tr - 0.09) = -0.0399736
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## Simulation Phase Space
# [component: outputs PS]
N_turn := 2000*1000 = 2000000
rows(PS) = 2000
cols(PS) = 10
Time := N_turn*T_s = 3.376  # s
E_kin(n_tr) = 5.70925
300*5000 = 1500000
i := 0 .. rows(PS) - 1
n_turn[i] := PS[i, 0]
τ[i] := PS[i, 1]
ΔE[i] := PS[i, 2]
dpp[i] := PS[i, 3]
E[i] := PS[i, 6]
η[i] := PS[i, 5]
V[i] := PS[i, 7]
γ[i] := PS[i, 8]
γ_trans[i] := PS[i, 9]
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## γ-transition jump
Δq_max := 0.05
Δq == β_avg*ΔK_1/(4*π)
Δγ_tr := 0.045
Q := 9.44
β_avg := C_ring/(2*π*Q)  # m
BR := 45  # T/m
l_D := 0.47  # m
ΔK_1 := 4*π*Δq_max/β_avg = 0.0740848
N_D := 48
dγdt := 8.5
ΔG := ΔK_1*BR/(N_D*l_D) = 0.147776
n_tr = 1364164
Δn := n_tr - ((γ_tr - Δγ_tr - 1)*m_p - E_inj)/U = 140700
T_0(n_tr) = 1.70055e-6  # s
γ(n_tr) = 7.08662
Δn_jump := 2*Δγ_tr/(T_0(n_tr)*dγdt) = 6226.36
γ(n_tr - Δn) = 7.04162
γ(n_tr + Δn) = 7.13162
T_0(n_tr)*dγdt*Δn_jump = 0.09
γ_tr - Δγ_tr = 7.04162
T_0(n_tr)*Δn_jump*10^3 = 10.5882  # ms
γ_tr + Δγ_tr = 7.13162
Jump(n) := dγdt*T_0(n_tr)*(n - (n_tr - Δn))
γ_jump(n) := γ_tr*(n < n_tr - Δn) + (γ_tr - Jump(n))*(n_tr - Δn ≤ n < n_tr - Δn + Δn_jump) + (γ(n) - Δγ_tr)*(n_tr - Δn + Δn_jump ≤ n < n_tr + Δn) + γ_tr*(n > n_tr + Δn)
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## Twiss parameters
# [component: outputs TWi]
rows(TW) =  # error: Эта переменная не определена.
cols(TW) =  # error
j := 0 .. rows(TW) - 1
Name[j] := TW[j, 0]
s[j] := TW[j, 2]
β_x[j] := TW[j, 3]
α_x[j] := TW[j, 4]
μ_x[j] := TW[j, 5]
D_x[j] := TW[j, 11]
Dp_x[j] := TW[j, 12]
β_y[j] := TW[j, 6]
α_γ[j] := TW[j, 7]
μ_γ[j] := TW[j, 8]
D_y[j] := TW[j, 9]
Dp_y[j] := TW[j, 10]
Length[j] := TW[j, 13]
# quadrupole | sextupole
K1L[j] := TW[j, 14]
K2L[j] := TW[j, 15]
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