## Beam Acceleration in Booster at PIP-II intensity
# Fundamental constants
n_b1 ≡ transpose([0000, 260.0, 700, 1500, 1700, 2000, 2500, 2700, 2900, 3080, 3200, 11000, 13000, N_turn])  # error: Эта переменная не определена.
m_p := 938.256*10^6  # eV
M_p := 1.67252*10^-24
m_e := 0.511006*10^6  # eV
V_b1 ≡ 10^6*transpose([0.204, 0.37, 0.61, 0.85, 0.89, 0.90, 0.91, 0.92, 0.95, 1.0, 0.99, 0.97, 0.95, 0.3])
c := 2.997925*10^10  # cm/s
Z_0 := 377  # Ω
e_SI := 1.6021*10^-19
e_SGS := 4.80298*10^-10
e_conv := 299.7925
κ_B := 1.38054*10^-16
N_turn ≡ 15000
n := 0 .. N_turn
N_bi = 6.79443e12
r_p := e_SGS*e_conv/m_p
r_e := e_SGS*e_conv/m_e
## RF voltage
V_b1 ≡ 10^6*transpose([0.204, 0.37, 0.61, 0.84, 0.91, 0.92, 0.95, 1.0, 0.99, 0.98, 0.98, 0.97, 0.5, 0.3])
n := 0 .. N_turn
n_b1 ≡ transpose([0000, 260, 1100, 3000, 6000, 8000, 8500, 8750, 8900, 8950, 9000, 10950, 14500, N_turn])
vs := cspline(n_b, V_b)
V0[n] := interp(vs, n_b, V_b, n)
vs1 := cspline(n_b1, V_b1)
V1[n] := interp(vs1, n_b1, V_b1, n)
n_b ≡ transpose([0000, 260.0, 1200, 4000, 6000, 6800, 7000, 7150, 7400, 7900, 10500, 12000, 14000, N_turn])
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n_tr ≡ 8750
V_b ≡ 10^6*transpose([0.204, 0.36, 0.700, 0.980, 1.05, 1.07, 1.08, 1.12, 1.17, 1.180, 1.170, 1.12, 0.900, 0.45])
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# turn number
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## Basic ring parameters  and beam acceleration
C := 50304.00  # cm
V_RF
N_bi = 6.79443e12  # [MV]
α := .019912
γ_t := 1/sqrt(α)
q := 66
γ_t = 7.08668
E_min := 0.8*10^9  # eV
P_min := sqrt((E_min + m_p)^2 - m_p^2)
E_t := m_p*(γ_t - 1) = 5.71086e9
E_max := 8*10^9
# eV
P_max := sqrt((E_max + m_p)^2 - m_p^2)
f_ramp := 20  # Hz
P(t) := P_min + (P_max - P_min)/2*(1 - cos(2*π*f_ramp*t))
En(t) := sqrt(P(t)^2 + m_p^2) - m_p
v(t) := c*P(t)/(m_p + En(t))
N_bi = 6.79443e12
# Minimum L. bucket
# size (total aria):
t[0] := 0
t[n + 1] := t[n] + C/v(t[n])
p[n] := P(t[n])
ε_LB := 0.07  # eV*s
t[N_turn]*10^3 = 26.2117  # ms  # turn number
β[n] := v(t[n])/c
f0[n] := v(t[n])/C
γ[n] := 1 + En(t[n])/m_p
ε_LBσ := ε_LB/(6*π)
f_RF[n] := q*f0[n]
E[n] := En(t[n])
Ib[n] := e_SI*N_bi*f0[n]
10^3/(2*f_ramp) = 25  # ms
ν_x := 9.44
# Booster trim quad parameters
# GdL_max=0.8 kG
# G_max=40 G/cm
# L_eff=20 cm
# d(GdL)/dI=0.02489 kG/A
# I_max=32.141 A
# 48 quads located at βx=33 and 7.3 m
#
# From Dave Harding paper
# 1.6 kG at 64 A,  0.88 kG/ms (35.356 A/ms) at 95 V
#
# Maximum power supply voltage +-180 V
dαdn ≡ 1.2*10^-6
Δα.max := 1/2*dαdn*Δn_α
Δν_max := 1/1.26*ν_x^3/2*Δα.max
Δα.max = 6e-5
Δn_α ≡ 100
# The below numbers are taken from optics simulations:
Δν_max = 0.0200293
n_oα ≡ 0
Δα_r := 0.0014
I_r := 19  # A
I_max := I_r*Δα.max/Δα_r
dIdt_tr := f0[n_tr]*dαdn*I_r/Δα_r
I_max = 0.814286  # A
dIdt_tr*10^-3 = 9.60932  # A/ms
# Optics simulations for Booster:
# +19 A in all 24 quads located in S sections
# Makes: GdL = 473 G
# ΔQx=0.183 and Δα=0.0014
ηs[n] := α + dαdn*Δn_α^2*(n - n_tr - n_oα)/(Δn_α^2 + (n - n_tr - n_oα)^2) - 1/γ[n]^2
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η
# η | Maximum tune shift at transition
ηs[n_tr + 1] - ηs[n_tr] = 5.47295e-6
GdL_max := 800  # G
N_Q := 24
β_xmax := 4800
1/γ[n_tr]^2 - 1/γ[n_tr + 1]^2 = 4.27307e-6
Δν_Q := 1/(4*π)*e_conv*GdL_max/p[n_tr]*N_Q*β_xmax = 0.332651
n := 0 .. N_turn - 1
Vacc[n] := E[n + 1] - E[n]
ϕ0[n] := asin(Vacc[n]/V1[n])
Δα_max := -2*Δν_Q/ν_x^3*1.21 = -0.000956948
n - n_tr
ν_s0[n] := sqrt(V1[n]*q*|ηs[n]|/(2*π*m_p*γ[n]*β[n]^2))
ν_s[n] := ν_s0[n]*sqrt(cos(ϕ0[n]))
dα/dn == 1/f_0*dα/dt == 1.21/f_0*d/dt(1/ν_x^2) == -1.21*2/(f_0*ν_x^3)*dν/dt == -1.21*2/(f_0*ν_x^3)*d/dt(1/(4*π)*e_conv/p[n_tr]*dGdL_max/dt*N_Q*β_xmax)
ε_Laccep[n] := 8/π*m_p*C/(c*q)*sqrt(V1[n]*γ[n]/(2*π*m_p*q*|ηs[n]|))*(1 - sin(ϕ0[n]))/(1 + 0.5*sin(ϕ0[n]))^2
dGL_dt_ref := 0.88*10^6  # G/s
dαdn_max := 1.21*2/(f0[n_tr]*ν_x^3)*(1/(4*π)*e_conv*dGL_dt_ref/p[n_tr]*N_Q*β_xmax)
dαdn_max = 1.784e-6
Δp_p_max[n] := 2*ν_s0[n]/(q*|ηs[n]|)*sqrt(cos(ϕ0[n]) - (π/2 - ϕ0[n])*sin(ϕ0[n]))
ϕ0a[n] := ϕ0[n]*(n < n_tr + Δn_tr) + (π - ϕ0[n])*(n ≥ n_tr + Δn_tr)
σφ[n] := q*sqrt(2*π*ε_LBσ*c*|ηs[n]|/(m_p*C*β[n]*γ[n]*ν_s[n]))
σp[n] := sqrt(2*π*ε_LBσ*c*ν_s[n]/(m_p*C*β[n]*γ[n]*|ηs[n]|))
dαdn_ref := 0.0014/473*dGL_dt_ref/f0[n_tr] = 4.41432e-6
# for
U_ref := 95  # V
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max(Vacc) = 782877
(ηs[n_tr + 1] - ηs[n_tr])/(1/γ[n_tr]^2 - 1/γ[n_tr + 1]^2) = 1.2808
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n_tr = 8750
Δp_p_max[0] = 0.00242499
ε_Laccep[0] = 0.114798
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# V0
# Vacc
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σ_φ
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nn := 0 .. n_tr + Δn_tr - 1
Δϕ[nn] := Δφ_jump*nn/(n_tr + Δn_tr)
nn := n_tr + Δn_tr .. N_turn - 1
Δϕ[nn] := Δφ_jump*(nn - N_turn)/(N_turn - n_tr - Δn_tr)
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# RF phase for
# 6.5e12 p/beam
# RF phase for
# 4.7e12 p/beam
# RF phase for
# zero intensity
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Δn_tr = 70
# RF phase for
# zero intensity
# time [s] | time [s]
# Momentum offset:
Δp_fb[n] := 0
# Dipole damper:
G_d ≡ 0.01
Gd[n] := G_d*sign(cos(ϕ0a[n] + Δϕ[n]))
# Quad damper
G_q ≡ 0.02
nn := 0 .. n_tr - 1
Gq[nn] := G_q*(1 + 5*nn/n_tr)
nn := n_tr .. N_turn - 1
Gq[nn] := (G_q1 + (G_q2 - G_q1)*(nn - n_tr)/(N_turn - n_tr))
α_p = -0.09
3*β[n_tr]^2/(2*γ[n_tr]^2) = 0.0290453
α_p + 3*β[n_tr]^2/(2*γ[n_tr]^2) = -0.0609547
λ_Q[n] := 2*π^2*ν_s[n]^2*Gq[n]*σφ[n]
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ε_xmax := 4*10^-3  # cm
ax_ref := 2.8  # cm
Dx_ref := 184  # cm
βx_ref := 739  # cm
Δp_max[n] := 1/Dx_ref*sqrt(ax_ref^2 - ε_xmax*βx_ref/(β[n]*γ[n]))
ηs_p[n] := α_p + 3*β[n]^2/(2*γ[n]^2)
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Δs/C == (α - 1/γ^2)*Δp/p + (α_p + 3/2*β^2/γ^2)*(Δp/p)^2
ra[n, 0] := E[n]
ra[n, 1] := V1[n]
ra[n, 2] := ϕ0a[n]
ra[n, 3] := Δϕ[n]
ra[n, 4] := Gd[n]
ra[n, 5] := Gq[n]
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ra[n, 6] := Δp_fb[n]
ra[n, 7] := ηs_p[n]
ra[n, 8] := Δp_max[n]
ra[n, 9] := ηs[n]
# [component: inputs ra]
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## Booster impedance de to dipole laminations
L_d := 289  # cm
N_cell := 24
L_dip := 2*N_cell*L_d
a_F := 1.64*2.54*0.5  # cm
a_F = 2.0828  # cm
h ≡ 45*10^-4  # cm
a_D := 2.25*2.54*0.5  # cm
b_d := 15.24  # cm
a_D = 2.8575  # cm
ε_d ≡ 2.5
L_dip*0.01 = 138.72  # m
d := 0.064  # cm
σ_S := 2.07*10^16
a := 5.0
b := 0.55
## Permeability of soft steel and impedance of Booster laminations
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f_t1 := 7*10^7
f_t2 := 3*10^9
x := .5
g1 := 1 + 2*ln(a/b) = 5.41455
μ(f) := 26/(1 + 1i*f/f_t1) + 9/((1 + x*1i*f/f_t2)*(1 + 1i*f/(x*f_t2)))
n_σ := 4
ln(n_σ/1.06) = 1.32803
R := C/(2*π) = 8006.13
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Z_S.(ω, γ) := -1i*ω*C/(2*π*c)*Z_0*g1/(γ^2 - 1)
n_cutoff := R/b = 14556.6
# Re(μ)
δ(ω) := sqrt(1/(2*π*σ_S*ω*μ(ω/(2*π))))
Z_SCn(β, γ) := -1i*Z_0*g1/(2*β*γ^2)
# Im(μ)
Z_SCn(β[n_tr], γ[n_tr]) = -20.3636i
# f [Hz]
f := 1, 10 .. 1000
δ_S(ω) := c/sqrt(2*π*σ_S*ω*μ(ω/(2*π)))
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κ_y(ω, a, ξ) := sqrt(ε_d*ω^2*a^2/c^2*(1 + (1 - 1i)*δ_S(ω)*μ(ω/(2*π))/h) - ξ^2)
F_L(ξ, a, ω) := ξ/κ_y(ω, a, ξ)*h/(d + h)*(1 + (1 - 1i)*μ(ω/(2*π))*δ_S(ω)/h)*tan(κ_y(ω, a, ξ)*(b_d/a - 1))
Z_LL(ω, a) := 1i*Z_0*ω/(2*π*c)*integral(F_L(ξ, a, ω)/(ξ*cosh(ξ)^2)*1/(F_L(ξ, a, ω)*tanh(ξ) + 1), ξ = 0 .. 10)
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# Re(Z_(||)) - F dipole
## Total Resistive wall impedance
Z_LB(ω) := 0
# Re(Z_(||)) - D dipole
# Im(Z_(||)) - F dipole
## Space charge impedance
# Im(Z_(||)) - D dipole
n_σ := 4
Z_RW.(ω, γ) := (1 + 1i)*ω*C/(2*π*c)*Z_0*δ(ω)*sqrt(1 - 1/γ^2)/(2*a)
Z_SC.(ω, γ) := -1i*Z_0/(2*π)*ω*C/((γ^2 - 1)*c)*g1/2
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# f [MHz]
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## Initial distribution
## Linac beam parameters:
σ_p := 2*10^-4
T_inj := 0.55*10^-3  # s
ε_znΔp := 1.095*10^-6  # eV s  # - rms beam emittance
f_L := 0.65*10^9  # Hz
T_L := 1/f_L
f_B := f_L/4
T_B := 1/f_B
σ_s0 := c*ε_znΔp/(p[0]*σ_p)
N_inj := floor(f0[0]*T_inj)
σ_φ0 := σ_s0/(β[0]*c)*2*π*f_L
σ_s0 = 0.11217  # cm
N_inj = 275  # turns
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N_inj*ν_s[0] = 5.97577
# Z
# [kΩ]
## Longitudinal "painting"
σ_φ0 = 1.04005 deg
Δp_ofs ≡ 0.7*10^-3
Phase(φRF_in) :=
    i ← 0
    t ← 0
    for n ∈ 0 .. floor(f_B*T_inj)
        t ← T_B*n
        φ ← 2*π*(((φRF_in + 2*π*f0[0]*t)/(2*π)) - floor((φRF_in + 2*π*f0[0]*t)/(2*π))) - π
        continue if (|φ| > φ_max/q)
        r[i, 0] ← floor(f0[0]*t)
        r[i, 1] ← q*φ
        i ← i + 1
    r  # Re(Z_LM)
φ_max ≡ π*0.55
f_B*10^-6 = 162.5  # MHz
φRF_in := 0.3
# -Im(Z_SC)
φRF := Phase(φRF_in)
N_bnch := rows(φRF)
# Im(Z_LM)
nn := 0 .. N_bnch - 1
# f [MHz]
Nh := 128
nh := 0 .. Nh
φh[nh] := -π + 2*π*nh/Nh
f_B*T_inj = 89375
BunchDistr(φRF_in) :=
    for i ∈ 0 .. q - 1
        ρ[i] ← 0
    for n ∈ 0 .. floor(f_B*T_inj)
        t ← T_B*n
        φ ← 2*π*(((φRF_in + 2*π*f_RF[0]*t)/(2*π)) - floor((φRF_in + 2*π*f_RF[0]*t)/(2*π))) - π
        continue if (|φ| > φ_max)
        n ← mod(floor((φRF_in + 2*π*f_RF[0]*t)/(2*π)), q)
        ρ[n] ← ρ[n] + 1
    ρ
N_bnch = 742
n_bb := BunchDistr(φRF_in)
nb := 0 .. q - 1
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Np := 58000
N_pt := 100
LMot(N_pt, N_inj) :=
    n ← 0
    i ← 0
    for turn ∈ 0 .. N_inj - 1
        while (turn == φRF[i, 0])
            pt ← rnorm(N_pt, Δp_ofs, σ_p)
            for j ∈ 0 .. N_pt - 1
                φ[n] ← φRF[i, 1]
                p[n] ← pt[j]
                n ← n + 1
            i ← i + 1
        for j ∈ 0 .. n - 1
            φ[j] ← φ[j] + 2*π*q*ηs[0]*p[j]
            p[j] ← p[j] + V1[0]/(γ[0]*β[0]^2*m_p)*sin(φ[j])
            ρ[j] ← 1
    R ← augment(φ, p, ρ)
sep(φ) := Δp_p_max[0]*cos(φ/2)
N_inj = 275
φ_fin := LMot(N_pt, N_inj)
Δp_L := rnorm(N_bnch, Δp_ofs, σ_p)
N_pt = 100
Np := rows(φ_fin)
n1 := 0 .. Np - 1
x = 0.5
ρ := hist(φh, φ_fin[:, 0])
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y
Δp/p
N_bi = 6.79443e12
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Δp/p
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# [component: inputs φ_fin]
# φ [rad]
ph[nh] := 3.3*10^-3*(2*nh/Nh - 1)
ρp := hist(ph, φ_fin[:, 1])
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# Initial momentum distribution used in simulations
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2*π/N*dN/dφ
f(p)
# p [10^-3]
## Initial beam distribution
N_bi ≡ 1/0.98*84/82*6.5*10^12
n_ref := n_tr
j := 1 .. Nh/2
Z_lb[j] := Z_LB(2*π*f_RF[n_ref]*j)
Z_sc[j] := Z_SC.(2*π*f_RF[0]*j, γ[0])
N_bi = 6.79443e12
ρω := fft(ρ)
j := 0 .. Nh/2
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Ztlb[j] := e_SI*N_bi*f_RF[n_ref]/q*Nh/Np*Z_lb[j]
Ztsc[j] := e_SI*N_bi*f_RF[n_ref]/q*Nh/Np*Z_sc[j]
Vωlb := vectorize(-Ztlb*ρω)
Vlb := ifft(Vωlb)
Vωsc := vectorize(-Ztsc*ρω)
Vsc := ifft(Vωsc)
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ρ = [
    0; 0; 0; 0; 0; 0; 0; 0; 0; 0
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]
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rz[j, 0] := Re(Ztlb[j])
rz[j, 1] := Im(Ztlb[j])
rz[j, 2] := Re(Ztsc[j])
rz[j, 3] := Im(Ztsc[j])
# [component: inputs rz; outputs rz]
## Turn-by-turn tracking with impedances accounted
# Legend for columns in file "AccCycleBunchPrm.dat"
# 0  1  2  3  4  5  6  7  8  9
# Ntot[n],  PhiAv[n], PAv[n], SigmaPhi[n],  SigmaP[n], Vrf[n], PhiAcc[n], DeltaPhiD[n], DeltaVQ[n], P_Phi[n]);
α_p ≡ -0.09
Δφ_jump ≡ π/180*18
G_q1 ≡ 7
G_q2 ≡ 3
# [component: outputs BP]
nt := 0 .. rows(BP) - 1
CorPhase(nt) :=
    r ← -BP[nt, 1]*180/π + 360*(ηs[nt] > 0)
    r ← r - 360 if r > 180
    r
Loss := 1 - BP[N_turn - 2, 0]/BP[5000, 0]
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# σ_φ
# [deg]
# V
# [MV]
G_q1 = 7
G_q2 = 3
Δn_tr = 70
α_p = -0.09
N_bi = 6.79443e12
Δn_tr ≡ 70
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G_q1 = 7
Loss = 0.000934364
Np = 73900
G_q2 = 3  # ε_L
# [eV s]
N_bi = 6.79443e12
Loss = 0.0934364 %
Δn_α = 100
dαdn = 1.2e-6
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# turn number
# φ_acc
# [deg]
# Accelerating phase in simulations
# Δp/p
# [10^-3]
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# Momentum offset in simulations
# φ_acc
# [deg]
# Δp/p
# [10^-3]
# Momentum offset in simulations
# Accelerating phase in simulations | Expected accelerating phase
# Expected accelerating phase
Δφ_jump*180/π = 18
# Accelerating phase for zero intensity | Accelerating phase for zero intensity
# turn number | turn number | turn number
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# σ_φ
# [deg]
# Simulations
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# σ_φ
# [deg]
# σ_p
# [10^-3]
# σ_φ adiabatic
# theory
# σ_p, simulations
# Adiabatic
# theory
# turn number | σ_φ, simulations
# Relative emittance
# growth
εrms[nt] := sqrt(BP[nt, 3]^2*BP[nt, 4]^2 - BP[nt, 9]^2)
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# turn number
# Zero current
# acc. phase
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# Measurements | Measurements
# Zero current
# acc. phase
## Longitudinal particle distribution and wake-field
Δn := 2000
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# [component: outputs D]
nd := 1 .. cols(D) - 1
n_tr = 8750
D[48, 0] - n_tr = -1478
rows(D) = 100
cols(D) = 129
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## Average beam deceleration
k := 0 .. rows(D)/2 - 1
Vba[k] := -(sum(D[2*k + 1, nd]*D[2*k, nd], nd)/sum(D[2*k, nd], nd))
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## Before transition
no := 6
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## After transition
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N_p := N_bi
D[48, 0] - n_tr = -1478
D[50, 0] - n_tr = -1175
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# 136 turns before transition
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# 439 turns after transition
# V_beam
# [kV]
N_p = 6.79443e12  # V_beam  # dn/ds
# V_beam
# [kV]
# V_beam
dn/ds
N_p = 6.79443e12
# dn/ds | dn/ds
# RF phase [deg] | RF phase [deg]
σ_τ1 := 0.80  # ns
σ_τ2 := 0.74  # ns
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ρt46[nd - 1] := D[46, nd]
St46 := FFT(ρt46)
ρt50[nd - 1] := D[50, nd]
St50 := FFT(ρt50)
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# Beam spectrum
|S_ω|
# Before transition
# After transition
# f [GHz]
## Space charge tune shifts
# Ring Twiss parameters
# [component: outputs M]
i := 0 .. rows(M) - 1
s[i] := M[i, 2]
βx[i] := M[i, 3]
βy[i] := M[i, 5]
Dx[i] := M[i, 7]
Dxp[i] := M[i, 8]
ε_nxEf := 0.0005  # cm
ε_nyEf := 0.0005  # cm
εx[n] := ε_nxEf/(β[n]*γ[n])
εy[n] := ε_nyEf/(β[n]*γ[n])
Ib[n] := e_SI*N_bi*f0[n]
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GetBunching(D) :=
    for k ∈ 0 .. rows(D)/2 - 1
        nturn[k] ← D[2*k, 0]
        for j ∈ 1 .. cols(D) - 1
            f[j - 1] ← D[2*k, j]
        S[k] ← sum(f[j], j = 0 .. cols(D) - 2)
        B[k] ← (cols(D) - 2)*max(f)/S[k]
    R ← augment(nturn, S, B)
    R
DS := GetBunching(D)
B[k] := DS[k, 2]
ntt[k] := DS[k, 0]
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AA[k] := -r_p*N_bi*B[k]/(2*π*β[ntt[k]]^2*γ[ntt[k]]^3*C)
δν_xSC[k] := AA[k]*sum(βx[j]*(s[j + 1] - s[j])*100/(sqrt(βx[j]*εx[ntt[k]] + (BP[ntt[k], 4]*Dx[j])^2)*(sqrt(βx[j]*εx[ntt[k]] + (BP[ntt[k], 4]*Dx[j])^2) + sqrt(βy[j]*εy[ntt[k]]))), j = 0 .. rows(M) - 2)
t_tr := 10^3*t[n_tr]
δν_ySC[k] := AA[k]*sum(βy[j]*(s[j + 1] - s[j])*100/(sqrt(βy[j]*εy[ntt[k]])*(sqrt(βx[j]*εx[ntt[k]] + (BP[ntt[k], 4]*Dx[j])^2) + sqrt(βy[j]*εy[ntt[k]]))), j = 0 .. rows(M) - 2)
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# δν_SCx
# δν_SCy
# t [ms]
## Particle distributions before and after transition
# [component: outputs MC]
k := 0 .. rows(MC) - 1
rows(MC) = 73900
cols(MC) = 3
N_trn := rows(BP) - 1
pb2(φ) := Δp_p_max[N_trn]*sin(φ/2)
xs := 0.953
ϕ_max := xs*0.9
Δϕ := 0.08
p_max := xs*1.4*10^-3
Δp := 1.2*10^-4
ϕ := 0, 0.02 .. 2*π
# Particle loss:
ε_97 := π*p_max*β[N_trn]*p[N_trn]*ϕ_max/(2*π*f_RF[N_trn])
ε_rms := π*p[N_trn]*β[N_trn]*BP[N_trn, 3]*BP[N_trn, 4]/(2*π*f_RF[N_trn])
1 - BP[N_trn - 2, 0]/BP[0, 0] = 0.00165088
εL[nt] := 6*π*p[nt]*β[nt]*sqrt(BP[nt, 3]^2*BP[nt, 4]^2 - BP[nt, 9]^2)/(2*π*f_RF[nt])
# Required (97%) emittance  0.10 eV s
N_h := 50
n_h := 0 .. N_h
ε_mh := 0.3
εh[n_h] := ε_mh*n_h/N_h
εp[k] := ε_97*(((MC[k, 1] - Δp)/p_max)^2 + ((MC[k, 0] - Δϕ - π)/ϕ_max)^2)
fd := hist(εh, εp)
f_s[0] := 0
n_h := 0 .. N_h - 1
f_s[n_h + 1] := f_s[n_h] + fd[n_h]
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# ε_L | Δp/p
# [eV s]
Δp/p
ϕ_max = 0.8577
p_max = 0.0013342
Δϕ = 0.08
Δp = 0.00012
# turn number
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φ
# Relative emittance
# growth
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# Longitudinal
# distribution
# Final
σ_p*σ_s/(σ_p0*σ_s0)
ε_97 = 0.128682  # eV s
ε_rms = 0.0242922  # eV s
# φ
# Percentage  of part. numb. in ε_L
6*ε_rms = 0.145753  # eV s
1/2*sum(εh[n_h]*fd[n_h], n_h)/sum(fd[n_h], n_h) = 0.0421932  # eV s
# ε_L [eV s]
# turn number
## Appendix A: Linearized transition crossing (taken from S.Y.Lee book)
τ_ad == (π*β^2*m*c^2*γ_t^4/(ω_0^2*q*e*V_0*|cos(φ_acc)|)*(dγ/dt)^-1)^(1/3) == (β^2*γ^4*tan(ϕ0a)/(2*ω_0*q)*(dγ/dt)^-2)^(1/3)
dγdt := V1[n_tr]*sin(ϕ0a[n_tr])/m_p*f0[n_tr] = 454.143
ϕ0a[n_tr]*180/π = 46.2323
d/dx(1/x*(d/dx(φ(x)))) + φ(x) == 0
# where:
x == t/τ_ad
γ[n_tr] = 7.11501
V1[n_tr] = 1000000
τ_ad := (π*β[n_tr]^2*m_p*γ[n_tr]^4/((2*π*f0[n_tr])^2*q*V1[n_tr]*dγdt*|cos(ϕ0a[n_tr])|))^(1/3)
φ_1(x) := x*Jn(2/3, 2/3*x^(3/2))
φ_2(x) := x*Yn(2/3, 2/3*x^(3/2))
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φ_2(10^-6) = -0.896577
τ_ad*10^6 = 296.188  # μs
3^(2/3)*1/π*Γ(2/3) = 0.896577
# Bunch length (in radians)
σφ_tr == 3^(2/3)*1/π*sqrt(2/3)*Γ(2/3)*sqrt(ε_L*q^2*ω_0^2*dγdt*τ_ad^2/(m_p*β_t^2*γ_t^4)) == 3^(2/3)*1/π*sqrt(2/3)*Γ(2/3)*sqrt(ε_L*q^2*ω_0^2*dγdt/(m_p*β_t^2*γ_t^4)*(β^2*γ^4*tan(ϕ0a)/(2*ω_0*q*dγdt^2))^(2/3))
σφ_tr == nthroot(6, 6)/π*Γ(2/3)*q^(2/3)*ω_0^(2/3)*tan(ϕ0a)^(1/3)/(β_t^(1/3)*γ_t^(2/3)*dγdt^(1/6))*sqrt(ε_L/m_p)
σφ_tr == nthroot(6, 6)/π*Γ(2/3)*nthroot(q^2*ω_0^2/(β_t*γ_t^2*sqrt(dγdt))*tan(ϕ0a), 3)*sqrt(ε_L/m_p)
nthroot(6, 6)/π*Γ(2/3) = 0.58103
σφ_tr := 0.581*nthroot(q^2*(2*π*f0[n_tr])^2/(β[n_tr]*γ[n_tr]^2*sqrt(dγdt))*tan(ϕ0a[n_tr]), 3)*sqrt(π*ε_LBσ/m_p) = 0.0795401
σφ_tr*180/π = 4.55731  # deg
# For n_σφ := 5 the maximum banch length is about:
σφ_max := (0.581*nthroot(q^2*(2*π*f0[n_tr])^2/(n_σφ*β[n_tr]*γ[n_tr]^2*sqrt(dγdt)), 3)*sqrt(π*ε_LBσ/m_p))^(3/4) = 0.099089
σp_tr == γ_t/(3^(1/6)*τ_ad*β_t*Γ(2/3))*sqrt(2*ε_L/(3*m_p*dγdt)) == γ_t/(3^(1/6)*β_t*Γ(2/3))*sqrt(2*ε_L/(3*m_p*dγdt))*(dγdt*ω_0^2*q*e*V_0*|cos(φ_acc)|/(π*β_t^2*m_p*γ_t^4))^(1/3)
σp_tr == 1/(3^(1/6)*Γ(2/3))*sqrt(2*ε_L/(3*m_p))*(ω_0^2*q*|cos(φ_acc)|/(π*sqrt(dγdt)*β_t^5*γ_t)*e*V_0/m_p)^(1/3)
σp_tr := 1/(3^(1/6)*Γ(2/3))*sqrt(2*ε_LBσ/(3*m_p))*((2*π*f0[n_tr])^2*q*|cos(ϕ0a[n_tr])|/(π*sqrt(dγdt)*β[n_tr]^5*γ[n_tr])*V1[n_tr]/m_p)^(1/3) = 0.00113726
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# Let's consider the accelerating wave which can be composed from few harmonics. In this case
τ_ad == (π*β^2*m*c^2*γ_t^4/(ω_0^2*q*e*dVdφ*dγdt))^(1/3)
σφ_tr == 3^(2/3)*1/π*sqrt(2/3)*Γ(2/3)*sqrt(ε_L*q^2*ω_0^2*dγdt/(m_p*β_t^2*γ_t^4))*(π*β^2*m*c^2*γ_t^4/(ω_0^2*q*e*dVdφ*dγdt))^(1/3) == (3/π)^(2/3)*sqrt(2/3)*Γ(2/3)*dγdt^(1/6)*(q^2*m_p*ω_0/(β_t*γ_t^2*dVdφ))^(1/3)*sqrt(ε_L/m_p)
# Local momentum spread:
ΔΕ == ε_L/(π*Δt) == 2*π*ε_L*f_0/(π*σφ_tr) == ε_L*ω_0/(π*σφ_tr)
# Voltage difference excited by the impedance:
δV_Z == Z_L*2*e*N_b/(π*Δt)
# The ratio of energy differnce accumulated in the course of 2τ_ad is:
ΔΕ_Z/ΔΕ == δV_Z/ΔΕ*(2*τ_ad*ω_0/(2*π)) == Z_L*2*e*N_b/(π*Δt)*π*Δt/ε_L*(2*τ_ad*ω_0/(2*π)) == Z_L*2*e*N_b/(π*ε_L)*(τ_ad*ω_0) == Z_L*2*e*N_b/(π*ε_L)*ω_0*(π*β_t^2*m_p*γ_t^4/(ω_0^2*q*dVdφ*dγdt))^(1/3)
ΔΕ_Z/ΔΕ == 2/π*e*N_b*Z_L/ε_L*(π*β_t^2*m_p*ω_0*γ_t^4/(q*dVdφ*dγdt))^(1/3)
## Appendix B: Performance of Booster Trim quads at Booster Transition Crossing
## Skin-effect in the vaccum chamber
# Inside the chamber
# /
# |
# \
B_r == G*r*sin(2*θ)
φ == -G*r^2/2*sin(2*θ)
B_θ == G*r*cos(2*θ)
# /
# |
# \
B_x == G*y
φ == -G*x*y
dΦ == (G*yx + G*x*y)*dθ == G*a^2*sin(2*θ)*dθ
j_s == d*σ*E == d*σ*1/c*dΦ/dt == d*σ/c*dG/dt*a^2*cos(2*θ)/2
B_y == G*x
δB == 4*π/c*j_s == 2*π*σ*a^2*d/c^2*dG/dt*cos(2*θ)
# Outside the chamber
# /
# |
# |
# |
# |
# |
# \
B_r == (-G_2*a^4/r^3 + G_0*r)*sin(2*θ)
φ == (-G_0*r^2/2 - a^4*G_2/(2*r^2))*sin(2*θ)
# Comparing one obtains
B_θ == (G_2*a^4/r^3 + G_0*r)*cos(2*θ)
# /
# |
# |
# \
-G_2 + G_0 == G
# =>
(G_0 - G) + G_0 == G + δB/a
# =>
2*G_0 == 2*G + δB/a == 2*G + 2*π*σ*d*a/c^2*dG/dt
G_2 + G_0 == G + δB/a
# For alternative current we have
# /
# |
# |
# |
# |
# \
G == G_0/(1 + 1i*d*a/(2*δ_s^2)*G)
2*G_0 == 2*G + 2*π*σ*d*a/c^2*1i*ω*G
# =>
G == G_0/(1 + 1i*π*σ*ω*d*a/c^2*G)  # =>
# Introduce
τ_w == π*σ*d*a/c^2
# then
dG/dt + G/τ_w == G_0/τ_w
δ_s == c/sqrt(2*π*σ*ω)
# For Booster vacuum chamber we have:
a := 6.6  # cm
d_w := 0.16  # cm
ρ_ss := 74*10^-6  # Ω/cm - stainless steel, 316
N_α := 4000
m := 0 .. N_α
σ_ss := 2.997925^2*10^11/ρ_ss
τ_w := π*σ_ss*d_w*a/c^2
τ_w*10^6 = 44.8314  # μs
τ_w*f0[n_tr] = 26.4526  # turns
δα0[m] := dαdn*Δn_α^2*(m - 0.5*N_α)/(Δn_α^2 + (m - 0.5*N_α)^2)
δα[0] := 0
δα[m + 1] := δα[m] + (δα0[m] - δα[m])/(τ_w*f0[n_tr])
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# Slip factor correction due to skin effect
δα
# turn number
# Below table is taken from "Booster Corrector System Specification" http://beamdocs.fnal.gov/AD/DocDB/0018/001881/004/Corrector_specs_update%20after%20prototype%20060720.pdf
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# Other references
# 1. V.S. Kashikhin, et.al. "A NEW CORRECTION MAGNET PACKAGE FOR THE FERMILAB BOOSTER SYNCHROTRON"
# 2. J. DiMarco, et.al. "TEST RESULTS OF THE AC FIELD MEASUREMENTS OF FERMILAB BOOSTER CORRECTOR MAGNETS"
# 3. C. Drennan, et. al. "SYSTEM OVERVIEW FOR THE MULTI-ELEMENT CORRECTOR MAGNETS AND CONTROLS FOR THE FERMILAB BOOSTER"
# Maximum Voltage of power supply - 160 V, DAC update time - 10 μs
U_max := 156  # V
L_q := 2.2*10^-3  # H
dIdt_max := U_max/L_q
dIdt_max*10^-3 = 70.9091  # A/ms
I_maxQ := 64.8
R_q := 0.105  # Ω
I_maxQ*R_q = 6.804  # V
T_DAC := 10^-5  # s
dGdLdt_Q := 0.02489*dIdt_max
f0[n_tr]*T_DAC = 5.90046  # turns
# Conclusions: Looks like the current ramp can be twice higher than specified
dGdLdt_Q*10^-3 = 1.76493  # kG/ms
# Power supply voltage required to support the ramp:
I_Q0[m] := dIdt_max/f0[n_tr]*Δn_α^2*(m - 0.5*N_α)/(Δn_α^2 + (m - 0.5*N_α)^2)
m := 0 .. N_α - 1
U[m] := R_q*I_Q0[m] + L_q*f0[n_tr]*(I_Q0[m + 1] - I_Q0[m])
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# I
# [A]
# U
# [V]
dI/dt == 71  # A/ms
d(GdL)/dt == 1.76  # kG/cm
# turn number
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## Appendix C: Negative mass instability
## Potential of beam space-charge in vacuum chamber
# In the space outside of the beam we have
φ(r, z) == (a_1*K0(k*r) + a_2*I0(k*r))*cos(k*z)
# One can test it substituting to Laplasian in cylindrical frame:
1/r*(d/dr(r*(d/dr((a_1*K0(k*r) + a_2*I0(k*r))*cos(k*z))))) + d^2/dz^2((a_1*K0(k*r) + a_2*I0(k*r))*cos(k*z)) == 0
# Using boundary condition we obtain:
φ(r, z) == a_0*(K0(k*a)*I0(k*r) - I0(k*a)*K0(k*r))*cos(k*z)
# Expand K0(x) to Teilor series:
K0(x) == -γ + ln(2) - ln(x) - x^2*(γ/4 - ln(2)/4 + ln(x)/4 - 1/4)
# => for small ρ:
φ(r, z) == a_0*(I0(k*a)*ln(r))*cos(k*z) == 2*I_0/(β*c)*ln(r)*cos(k*z)
# =>
a_0 == 2*I_0/(β*c*I0(k*a))
# =>
φ(r, z) == 2*I_0/(β*c*I0(k*a))*(K0(k*a)*I0(k*r) - I0(k*a)*K0(k*r))*cos(k*z)
# In the space inside the beam with uniform particle distribution across the beam, ρ(r, z) == ρ_0*cos(k*z), we have
φ(r, z) == (A*I0(k*r) + 4*π/k^2*ρ_0)*cos(k*z)
# Equalizing potential and its derivative at the beam boundary r=b
# /
# |
# |
# \
a_0*(K0(k*a)*I0(k*b) - I0(k*a)*K0(k*b)) == A*I0(k*b) + 4*π/k^2*ρ_0
a_0*(I0(a*k)*K1(k*b) + K0(a*k)*I1(k*b)) == A*I1(k*b)
A*I1(k*b)/(I0(a*k)*K1(k*b) + K0(a*k)*I1(k*b))*(K0(k*a)*I0(k*b) - I0(k*a)*K0(k*b)) - (A*I0(k*b) + 4*π/k^2*ρ_0) == 0
A == -4*π*ρ_0/(k^2*(I0(b*k) + I1(b*k)*(I0(a*k)*K0(b*k) - K0(a*k)*I0(b*k))/(I0(a*k)*K1(b*k) + K0(a*k)*I1(b*k))))
φ(r, z) == 4*π/k^2*ρ_0*(1 - I0(k*r)/(I0(b*k) + I1(b*k)*(I0(a*k)*K0(b*k) - K0(a*k)*I0(b*k))/(I0(a*k)*K1(b*k) + K0(a*k)*I1(b*k))))*cos(k*z)
φ(r, z) == 4*π/k^2*ρ_0*(1 - I0(k*r)*(I0(a*k)*K1(b*k) + K0(a*k)*I1(b*k))/(I0(a*k)*(I0(b*k)*K1(b*k) + I1(b*k)*K0(b*k))))*cos(k*z)
# Potential in the center:
ψ(k, a, b, r) := 4*π/k^2*(1 - I0(k*r)*(I0(a*k)*K1(b*k) + K0(a*k)*I1(b*k))/(I0(a*k)*(I0(b*k)*K1(b*k) + I1(b*k)*K0(b*k))))
# Potential in the center in the long wave approximation:
ψ0_c(a, b) := π*b^2*(2*ln(a/b) + 1)
# Potential at the boundary in the long wave approximation:
ψ0_b(a, b) := 2*π*b^2*ln(a/b)
## Longitudinal space-charge impedance
a := 5.0
b := 0.55
n_σ = 4
ln(n_σ/1.06) = 1.32803
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Z(ω, γ) := -1i*ω*1/□*Z_0*h/(2*γ^2*β)  # error: Пустой местозаполнитель.
ln(a/b) + 1/2 = 2.70727
Z_SCE(ω, γ) := -1i*Z_0/(4*π^2)*C*ω/(c*(γ^2 - 1)*b^2)*ψ(ω/(c*sqrt(γ^2 - 1)), a, b, 0)
f := 0.01, 1 .. 30
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Znn(γ) := Z_0/(γ*sqrt(γ^2 - 1))*(ln(a/b) + 1/2)
Znnh(n, γ) := Z_0/(γ*sqrt(γ^2 - 1))*2/(2*π*n/(γ*C)*b)^2
Zn_n(n, γ) := -1i*Z_0/(2*π)*1/(γ*sqrt(γ^2 - 1)*b^2)*ψ(2*π*n/(γ*C), a, b, 0)
n := 1 .. 200
Z_n := Znn(γ[n_tr])
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# Space charge impedance
# at transition
-Im(Z.n/n)
# [Ω]
# f [GHz]
## Instability growth rate
# Bunchng factor and peak current
B[nt] := sqrt(2*π)/BP[nt, 3]
I_peak[nt] := e_SI*N_bi*f_RF[n_ref]/q*B[nt]
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# Dimensionless growth rate (λ_d=λ/ω_0):
ω_0 := 2*π*f0[n_tr]
I_0 := 9
λ_d(n, η) := n*sqrt(2*π*Zn_n(n, γ[n_tr])*I_0/(m_p*γ[n_tr]*(1 - 1/γ[n_tr]^2))*η)
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# λ_d | 30 turns after trans.
# 10 turns after trans.
# f [GHz]
## Stability boundary
η_min[nt] := I_peak[nt]*Znn(γ[nt])/(2*π*m_p*γ[n_tr]*β[n_tr]^2*BP[nt, 4]^2)
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## Effect of second order slip-factor
# η_b
Δω == ω_0*(η*Δp/p + η_p*(Δp/p)^2)
# η(n)
conj(Δω^2) == 1/(sqrt(2*π)*σ_p)*integral(ω_0^2*(η*Δp/p + η_p*(Δp/p)^2)^2*exp(-1/(2*σ_p^2)*(Δp/p)^2), Δp/p = -∞ .. ∞)  # turn after transition
conj(Δω^2) == ω_0^2/sqrt(2*π)*integral((σ_p^2*η^2*x^2 + η_p^2*σ_p^4*x^4)*exp(-(x^2/2)), x = -∞ .. ∞) == ω_0^2*(σ_p^2*η^2 + 3*η_p^2*σ_p^4)
# => stability boundary
ηp[nt] := I_peak[nt]*|Znn(γ[nt])|/(sqrt(3)*2*π*m_p*γ[n_tr]*β[n_tr]^2*BP[nt, 4]^3)
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## Velosity contribution to the second order slip-factor
η_bp
v == (p + δp)/sqrt((p + δp)^2 + m^2)
p/sqrt(m^2 + p^2) + δp*m^2/(m^2 + p^2)^(3/2) - δp^2*(3*m^2*p/(2*(m^2 + p^2)^(5/2))) == β + δp/(m*γ^3) - δp^2*3*β/(2*m^2*γ^4)
# turn after transition
δv == β + δp*β/(p*γ^2) - (δp/p)^2*3*β^3/(2*γ^2)
δv/v == 1/γ^2*δp/p - 3*β^2/(2*γ^2)*(δp/p)^2
